Fri 10/04/2024
01:16 PM
$SIZES MAXFCN = 5000000
$PROBLEM    Dual Numbers benchmark
$INPUT       ID TIME AMT DV WT
  ;; $DATA      c:/git/adpoBenchmark/data/sim_1_3_0_0.csv IGNORE=@
$DATA      C:/git/adpoBenchmark/data/sim_1_3_0_0.csv IGNORE=@

$SUBROUTINE ADVAN6 TOL=7
$MODEL
  COMP=(DEPOT,DEFDOSE)
  COMP=(CENTRAL,NODOSE,DEFOBS)
  COMP=(PERI,NODOSE)
$PK
  CWT = WT/70

  TVVMAX= THETA(1)
  VMAX=TVVMAX*EXP(ETA(1))
  TVKM = THETA(2)
  KM = TVKM *EXP(ETA(2))
  TVV2=THETA(3)
  V2=TVV2 *EXP(ETA(3))
  TVKA=THETA(4)
  KA=TVKA *EXP(ETA(4))
  K23=THETA(5)
  K32=THETA(6)
  SC = V2
$ERROR
  IPRED = F
  Y=F*EXP(EPS(2)) + EPS(1)
$DES
  CONC = A(2)/SC
  DADT(1) = -KA*A(1)
  DADT(2) =  KA*A(1)-VMAX*CONC/(KM+CONC) -K23*A(2)+K32*A(3)
  DADT(3) = K23*A(2)-K32*A(3)

$THETA
  (100,4000)	; THETA(1) VMAX UNITS =  MG/HR
  (100,4000)	; THETA(2) KM UNITS =  CONC
  (0,50) 	; THETA(3) V  UNITS = L
  (0,1.2) 	; THETA(4) KA UNITS = 1/HR

  (0.0001,2)	 ;; THETA(5) K23
  (0.0001,3)	 ;; THETA(6) K32
; empty $OMEGA
$OMEGA
  0.1		; ETA(1) ETA ON VMAX
  0.1		; ETA(2) ETA ON KM
  0.1		; ETA(3) ETA ON V2
  0.1		; ETA(4) ETA ON KA
$SIGMA
  (1) ;; EPS(1) ADDITIVE
  (0.3) ;; EPS(2) PROPORTIONAL
  $EST METHOD=COND INTER PRINT = 1 MAXEVALS=9999 NOHABORT NOOMEGABOUNDTEST NOSIGMABOUNDTEST NOTHETABOUNDTEST
  $COV UNCOND PRECOND=2
  ;;; Model Identifier =  1,3,0,0

$TABLE ID TIME IPRED DV NOAPPEND ONEHEADER NOPRINT FILE= Run1Preds.dat

;; Phenotype: ([('COMP', 1), ('ETAs', 3), ('V~WT', 0), ('GAMMA', 0)])
;; Genotype: [1, 3, 0, 0]
;; Num non-influential tokens: 0

NM-TRAN MESSAGES
 WARNINGS AND ERRORS (IF ANY) FOR PROBLEM    1
 (WARNING  2) NM-TRAN INFERS THAT THE DATA ARE POPULATION.
Note: Analytical 2nd Derivatives are constructed in FSUBS but are never used.
      You may insert $ABBR DERIV2=NO after the first $PROB to save FSUBS construction and compilation time

1NONLINEAR MIXED EFFECTS MODEL PROGRAM (NONMEM) VERSION 7.5.1
 ORIGINALLY DEVELOPED BY STUART BEAL, LEWIS SHEINER, AND ALISON BOECKMANN
 CURRENT DEVELOPERS ARE ROBERT BAUER, ICON DEVELOPMENT SOLUTIONS,
 AND ALISON BOECKMANN. IMPLEMENTATION, EFFICIENCY, AND STANDARDIZATION
 PERFORMED BY NOUS INFOSYSTEMS.
 PROBLEM NO.:         1
 Dual Numbers benchmark
 TOT. NO. OF OBS RECS:      480
 TOT. NO. OF INDIVIDUALS:       60
 GENERAL NONLINEAR KINETICS MODEL (DVERK1, ADVAN6)
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 #TBLN:      1
 #METH: First Order Conditional Estimation with Interaction
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
 #TERM:
0MINIMIZATION SUCCESSFUL
 HOWEVER, PROBLEMS OCCURRED WITH THE MINIMIZATION.
 REGARD THE RESULTS OF THE ESTIMATION STEP CAREFULLY, AND ACCEPT THEM ONLY
 AFTER CHECKING THAT THE COVARIANCE STEP PRODUCES REASONABLE OUTPUT.
 NO. OF FUNCTION EVALUATIONS USED:     1403
 NO. OF SIG. DIGITS IN FINAL EST.:  3.3

 ETABAR IS THE ARITHMETIC MEAN OF THE ETA-ESTIMATES,
 AND THE P-VALUE IS GIVEN FOR THE NULL HYPOTHESIS THAT THE TRUE MEAN IS 0.

 ETABAR:        -6.1680E-03 -7.5081E-03 -1.0621E-02 -2.2259E-02
 SE:             3.7195E-02  3.0015E-02  4.3039E-02  4.6028E-02
 N:                      60          60          60          60

 P VAL.:         8.6829E-01  8.0247E-01  8.0507E-01  6.2867E-01

 ETASHRINKSD(%)  2.0117E+01  4.0025E+01  1.2545E+01  2.7490E+01
 ETASHRINKVR(%)  3.6187E+01  6.4030E+01  2.3516E+01  4.7424E+01
 EBVSHRINKSD(%)  1.9955E+01  3.9523E+01  1.1392E+01  2.7024E+01
 EBVSHRINKVR(%)  3.5928E+01  6.3425E+01  2.1485E+01  4.6745E+01
 RELATIVEINF(%)  1.1550E+01  6.0322E+00  5.5776E+01  4.0440E+01
 EPSSHRINKSD(%)  1.4528E+01  1.4528E+01
 EPSSHRINKVR(%)  2.6945E+01  2.6945E+01


 TOTAL DATA POINTS NORMALLY DISTRIBUTED (N):          480
 N*LOG(2PI) CONSTANT TO OBJECTIVE FUNCTION:    882.18099187648579
 OBJECTIVE FUNCTION VALUE WITHOUT CONSTANT:    5567.2375499560248
 OBJECTIVE FUNCTION VALUE WITH CONSTANT:       6449.4185418325105
 REPORTED OBJECTIVE FUNCTION DOES NOT CONTAIN CONSTANT

 TOTAL EFFECTIVE ETAS (NIND*NETA):                           240


 #TERE:
 Elapsed estimation  time in seconds:   903.81
 TESTING R MATRIX FOR POSITIVE DEFINITNESS
 R MATRIX IS NOT POSITIVE DEFINITE
 PRECONDITIONING CYCLE NO.            1
 TESTING R MATRIX FOR POSITIVE DEFINITNESS
 R MATRIX IS NOT POSITIVE DEFINITE
 PRECONDITIONING CYCLE NO.            2
 Elapsed covariance  time in seconds:  1411.22
 Elapsed postprocess time in seconds:     3.62

 ********************               FIRST ORDER CONDITIONAL ESTIMATION WITH INTERACTION              ********************
 #OBJT:**************                       MINIMUM VALUE OF OBJECTIVE FUNCTION                      ********************
 #OBJV:********************************************     5567.238       **************************************************

 ********************               FIRST ORDER CONDITIONAL ESTIMATION WITH INTERACTION              ********************
 ********************                             FINAL PARAMETER ESTIMATE                           ********************

 THETA - VECTOR OF FIXED EFFECTS PARAMETERS   *********
         TH 1      TH 2      TH 3      TH 4      TH 5      TH 6
         4.04E+03  1.05E+03  2.19E+01  4.63E-01  1.48E+00  7.14E-01

 OMEGA - COV MATRIX FOR RANDOM EFFECTS - ETAS  ********
         ETA1      ETA2      ETA3      ETA4
 ETA1
+        1.30E-01
 ETA2
+        0.00E+00  1.50E-01
 ETA3
+        0.00E+00  0.00E+00  1.45E-01
 ETA4
+        0.00E+00  0.00E+00  0.00E+00  2.42E-01

 SIGMA - COV MATRIX FOR RANDOM EFFECTS - EPSILONS  ****
         EPS1      EPS2
 EPS1
+        3.17E-01
 EPS2
+        0.00E+00  2.34E-01

 OMEGA - CORR MATRIX FOR RANDOM EFFECTS - ETAS  *******
         ETA1      ETA2      ETA3      ETA4
 ETA1
+        3.61E-01
 ETA2
+        0.00E+00  3.88E-01
 ETA3
+        0.00E+00  0.00E+00  3.81E-01
 ETA4
+        0.00E+00  0.00E+00  0.00E+00  4.92E-01

 SIGMA - CORR MATRIX FOR RANDOM EFFECTS - EPSILONS  ***
         EPS1      EPS2
 EPS1
+        5.63E-01
 EPS2
+        0.00E+00  4.84E-01

 ********************               FIRST ORDER CONDITIONAL ESTIMATION WITH INTERACTION              ********************
 ********************                            STANDARD ERROR OF ESTIMATE                          ********************

 THETA - VECTOR OF FIXED EFFECTS PARAMETERS   *********
         TH 1      TH 2      TH 3      TH 4      TH 5      TH 6
         6.86E-01  1.46E+00  1.45E-02  1.18E-03  1.13E-03  1.24E-03

 OMEGA - COV MATRIX FOR RANDOM EFFECTS - ETAS  ********
         ETA1      ETA2      ETA3      ETA4
 ETA1
+        4.94E-02
 ETA2
+       .........  1.11E-01
 ETA3
+       ......... .........  1.11E-01
 ETA4
+       ......... ......... .........  1.10E-01

 SIGMA - COV MATRIX FOR RANDOM EFFECTS - EPSILONS  ****
         EPS1      EPS2
 EPS1
+        8.63E-04
 EPS2
+       .........  3.58E-06

 OMEGA - CORR MATRIX FOR RANDOM EFFECTS - ETAS  *******
         ETA1      ETA2      ETA3      ETA4
 ETA1
+        6.85E-02
 ETA2
+       .........  1.44E-01
 ETA3
+       ......... .........  1.46E-01
 ETA4
+       ......... ......... .........  1.12E-01

 SIGMA - CORR MATRIX FOR RANDOM EFFECTS - EPSILONS  ***
         EPS1      EPS2
 EPS1
+        7.66E-04
 EPS2
+       .........  3.70E-06
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 Elapsed finaloutput time in seconds:     0.20
 #CPUT: Total CPU Time in Seconds,     2190.109
