Thu 09/05/2024
06:59 PM
$PROBLEM    Dual Numbers benchmark - NONMEM
$ABBR DERIV2=NO
$INPUT       ID TIME AMT DV WT
$DATA      c:/git/adpoBenchmark/data/sim_1_5_1_0.csv IGNORE=@
  ;; data file name must match out file name in the template file for simulations in data folder
  ;;from data\template.txt
  ;; $TABLE ID TIME AMT IOBS EVID WT FILE=c:\git\dual_numbers\data\OUT_1_5_1_0.DAT NOPRINT NOHEADER NOAPPEND
  ;; and file read/write in make_data.r
  ;; file_name <- paste0(this_comp,"_",this_eta,"_",this_vwt,"_",this_gamma)
$SUBROUTINE ADVAN6 TOL=7
$MODEL
  COMP=(DEPOT,DEFDOSE)
  COMP=(CENTRAL,NODOSE,DEFOBS)
  COMP=(PERI,NODOSE)
$PK
  CWT = WT/70

  TVVMAX= THETA(1)
  VMAX=TVVMAX*EXP(ETA(1))
  TVKM = THETA(2)
  KM = TVKM *EXP(ETA(2))
  TVV2=THETA(3) *CWT**THETA(5)
  V2=TVV2 *EXP(ETA(3))
  TVKA=THETA(4)
  KA=TVKA
  K23=THETA(6)
  K32=THETA(7)
  SC = V2
$ERROR
 IPRED = F

  Y=F*EXP(EPS(2)) + EPS(1)
$DES
  CONC = A(2)/SC
  DADT(1) = -KA*A(1)
  DADT(2) =  KA*A(1)-VMAX*CONC/(KM+CONC) -K23*A(2) + K32*A(3)
  DADT(3) = K23*A(2)-K32*A(3)

$THETA
  (100,4000)	; THETA(1) VMAX UNITS =  mass/time
  (100,4000)	; THETA(2) KM UNITS = mass/volume
  (1,50) 		; THETA(3) V  UNITS = volume
  (0.01,1.2,3) 		; THETA(4) KA UNITS = 1/time

  (0,1.1,10) 	;; THETA(5) V~WT
  (0.0001,2,10)	 ;; THETA(6) K23
  (0.0001,3,10)	 ;; THETA(7) K32
  ;; Start OMEGA
$OMEGA  BLOCK(3)
  0.1		; ETA(1) ETA ON VMAX
  0.05 0.1		; ETA(2) ETA ON KM
  0.05 0.05 0.1		; ETA(3) ETA ON V2
$SIGMA
  (1) ;; EPS(1) ADDITIVE
  (0.3) ;; EPS(2) PROPORTIONAL
$EST METHOD=COND INTER MAXEVALS=9999 NOHABORT NOOMEGABOUNDTEST NOSIGMABOUNDTEST NOTHETABOUNDTEST
$COV UNCOND PRECOND=2
  ;;; Model Identifier =  1,5,1,0

;; Phenotype: ([('COMP', 1), ('ETAs', 5), ('V~WT', 1), ('GAMMA', 0)])
;; Genotype: [1, 5, 1, 0]
;; Num non-influential tokens: 0

$TABLE ID TIME IPRED DV NOAPPEND ONEHEADER NOPRINT FILE= Run1Preds.dat

NM-TRAN MESSAGES
 WARNINGS AND ERRORS (IF ANY) FOR PROBLEM    1
 (WARNING  2) NM-TRAN INFERS THAT THE DATA ARE POPULATION.

1NONLINEAR MIXED EFFECTS MODEL PROGRAM (NONMEM) VERSION 7.4.3
 ORIGINALLY DEVELOPED BY STUART BEAL, LEWIS SHEINER, AND ALISON BOECKMANN
 CURRENT DEVELOPERS ARE ROBERT BAUER, ICON DEVELOPMENT SOLUTIONS,
 AND ALISON BOECKMANN. IMPLEMENTATION, EFFICIENCY, AND STANDARDIZATION
 PERFORMED BY NOUS INFOSYSTEMS.
 PROBLEM NO.:         1
 Dual Numbers benchmark - NONMEM
 TOT. NO. OF OBS RECS:      420
 TOT. NO. OF INDIVIDUALS:       60
 GENERAL NONLINEAR KINETICS MODEL (DVERK1, ADVAN6)
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 #TBLN:      1
 #METH: First Order Conditional Estimation with Interaction
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
 #TERM:
0MINIMIZATION SUCCESSFUL
 HOWEVER, PROBLEMS OCCURRED WITH THE MINIMIZATION.
 REGARD THE RESULTS OF THE ESTIMATION STEP CAREFULLY, AND ACCEPT THEM ONLY
 AFTER CHECKING THAT THE COVARIANCE STEP PRODUCES REASONABLE OUTPUT.
 NO. OF FUNCTION EVALUATIONS USED:     1413
 NO. OF SIG. DIGITS IN FINAL EST.:  3.8

 ETABAR IS THE ARITHMETIC MEAN OF THE ETA-ESTIMATES,
 AND THE P-VALUE IS GIVEN FOR THE NULL HYPOTHESIS THAT THE TRUE MEAN IS 0.

 ETABAR:        -3.7708E-02 -3.7997E-02 -2.0907E-02
 SE:             1.1247E-01  9.5927E-02  5.1191E-02
 N:                      60          60          60

 P VAL.:         7.3742E-01  6.9203E-01  6.8298E-01

 ETASHRINKSD(%)  6.4427E+00  6.2364E+00  6.1903E+00
 ETASHRINKVR(%)  1.2470E+01  1.2084E+01  1.1997E+01
 EBVSHRINKSD(%)  6.9585E+00  6.6933E+00  6.5494E+00
 EBVSHRINKVR(%)  1.3433E+01  1.2939E+01  1.2670E+01
 EPSSHRINKSD(%)  1.0066E+01  1.0066E+01
 EPSSHRINKVR(%)  1.9118E+01  1.9118E+01


 TOTAL DATA POINTS NORMALLY DISTRIBUTED (N):          420
 N*LOG(2PI) CONSTANT TO OBJECTIVE FUNCTION:    771.90836789192508
 OBJECTIVE FUNCTION VALUE WITHOUT CONSTANT:    5216.9285413646221
 OBJECTIVE FUNCTION VALUE WITH CONSTANT:       5988.8369092565472
 REPORTED OBJECTIVE FUNCTION DOES NOT CONTAIN CONSTANT

 TOTAL EFFECTIVE ETAS (NIND*NETA):                           180


 #TERE:
 Elapsed estimation  time in seconds:   667.64
 TESTING R MATRIX FOR POSITIVE DEFINITNESS
 R MATRIX IS NOT POSITIVE DEFINITE
 PRECONDITIONING CYCLE NO.            1
 TESTING R MATRIX FOR POSITIVE DEFINITNESS
 R MATRIX IS NOT POSITIVE DEFINITE
 PRECONDITIONING CYCLE NO.            2
 Elapsed covariance  time in seconds:   859.48
 Elapsed postprocess time in seconds:     1.23

 ********************               FIRST ORDER CONDITIONAL ESTIMATION WITH INTERACTION              ********************
 #OBJT:**************                       MINIMUM VALUE OF OBJECTIVE FUNCTION                      ********************
 #OBJV:********************************************     5216.929       **************************************************

 ********************               FIRST ORDER CONDITIONAL ESTIMATION WITH INTERACTION              ********************
 ********************                             FINAL PARAMETER ESTIMATE                           ********************

 THETA - VECTOR OF FIXED EFFECTS PARAMETERS   *********
         TH 1      TH 2      TH 3      TH 4      TH 5      TH 6      TH 7
         1.30E+04  4.12E+03  6.56E+00  3.47E-01  6.73E-02  9.17E+00  8.47E-01

 OMEGA - COV MATRIX FOR RANDOM EFFECTS - ETAS  ********
         ETA1      ETA2      ETA3
 ETA1
+        8.82E-01
 ETA2
+        7.17E-01  6.39E-01
 ETA3
+        3.69E-01  3.39E-01  1.82E-01

 SIGMA - COV MATRIX FOR RANDOM EFFECTS - EPSILONS  ****
         EPS1      EPS2
 EPS1
+        8.14E-01
 EPS2
+        0.00E+00  2.18E-01

 OMEGA - CORR MATRIX FOR RANDOM EFFECTS - ETAS  *******
         ETA1      ETA2      ETA3
 ETA1
+        9.39E-01
 ETA2
+        9.55E-01  7.99E-01
 ETA3
+        9.21E-01  9.95E-01  4.26E-01

 SIGMA - CORR MATRIX FOR RANDOM EFFECTS - EPSILONS  ***
         EPS1      EPS2
 EPS1
+        9.02E-01
 EPS2
+        0.00E+00  4.67E-01

 ********************               FIRST ORDER CONDITIONAL ESTIMATION WITH INTERACTION              ********************
 ********************                            STANDARD ERROR OF ESTIMATE                          ********************

 THETA - VECTOR OF FIXED EFFECTS PARAMETERS   *********
         TH 1      TH 2      TH 3      TH 4      TH 5      TH 6      TH 7
         1.48E+06  5.47E+05  1.03E+03  2.17E+00  4.58E+01  7.41E+01  1.18E+01

 OMEGA - COV MATRIX FOR RANDOM EFFECTS - ETAS  ********
         ETA1      ETA2      ETA3
 ETA1
+        1.81E+01
 ETA2
+        1.93E+01  2.32E+01
 ETA3
+        6.69E+00  6.48E+00  7.14E-01

 SIGMA - COV MATRIX FOR RANDOM EFFECTS - EPSILONS  ****
         EPS1      EPS2
 EPS1
+        2.80E-04
 EPS2
+       .........  1.03E-03

 OMEGA - CORR MATRIX FOR RANDOM EFFECTS - ETAS  *******
         ETA1      ETA2      ETA3
 ETA1
+        9.66E+00
 ETA2
+        1.50E+00  1.45E+01
 ETA3
+        9.05E+00  2.87E+00  8.38E-01

 SIGMA - CORR MATRIX FOR RANDOM EFFECTS - EPSILONS  ***
         EPS1      EPS2
 EPS1
+        1.55E-04
 EPS2
+       .........  1.10E-03

 ********************               FIRST ORDER CONDITIONAL ESTIMATION WITH INTERACTION              ********************
 ********************                          COVARIANCE MATRIX OF ESTIMATE                         ********************

            TH 1      TH 2      TH 3      TH 4      TH 5      TH 6      TH 7      OM11      OM12      OM13      OM22      OM23
             OM33      SG11      SG12      SG22
 TH 1
+        2.20E+12
 TH 2
+        8.10E+11  2.99E+11
 TH 3
+        1.53E+09  5.65E+08  1.07E+06
 TH 4
+       -3.20E+06 -1.18E+06 -2.23E+03  4.70E+00
 TH 5
+        6.79E+07  2.51E+07  4.73E+04 -9.90E+01  2.10E+03
 TH 6
+       -1.10E+08 -4.05E+07 -7.65E+04  1.60E+02 -3.40E+03  5.49E+03
 TH 7
+       -1.74E+07 -6.42E+06 -1.21E+04  2.55E+01 -5.38E+02  8.71E+02  1.38E+02
 OM11
+        2.69E+07  9.92E+06  1.87E+04 -3.92E+01  8.31E+02 -1.34E+03 -2.13E+02  3.29E+02
 OM12
+        2.86E+07  1.05E+07  1.99E+04 -4.16E+01  8.84E+02 -1.43E+03 -2.26E+02  3.50E+02  3.72E+02
 OM13
+        9.91E+06  3.66E+06  6.91E+03 -1.44E+01  3.07E+02 -4.96E+02 -7.86E+01  1.21E+02  1.29E+02  4.48E+01
 OM22
+        3.44E+07  1.27E+07  2.40E+04 -5.02E+01  1.07E+03 -1.72E+03 -2.73E+02  4.22E+02  4.48E+02  1.56E+02  5.40E+02
 OM23
+        9.60E+06  3.54E+06  6.69E+03 -1.40E+01  2.97E+02 -4.80E+02 -7.61E+01  1.18E+02  1.25E+02  4.34E+01  1.51E+02  4.20E+01
 OM33
+       -1.06E+06 -3.90E+05 -7.38E+02  1.54E+00 -3.27E+01  5.29E+01  8.38E+00 -1.30E+01 -1.38E+01 -4.78E+00 -1.66E+01 -4.63E+00
          5.10E-01
 SG11
+       -4.15E+02 -1.53E+02 -2.89E-01  6.05E-04 -1.28E-02  2.08E-02  3.29E-03 -5.08E-03 -5.40E-03 -1.87E-03 -6.51E-03 -1.82E-03
          2.00E-04  7.84E-08
 SG12
+       ......... ......... ......... ......... ......... ......... ......... ......... ......... ......... ......... .........
         ......... ......... .........
 SG22
+       -1.53E+03 -5.64E+02 -1.06E+00  2.23E-03 -4.72E-02  7.64E-02  1.21E-02 -1.87E-02 -1.99E-02 -6.90E-03 -2.40E-02 -6.68E-03
          7.36E-04  2.89E-07 .........  1.06E-06

 ********************               FIRST ORDER CONDITIONAL ESTIMATION WITH INTERACTION              ********************
 ********************                          CORRELATION MATRIX OF ESTIMATE                        ********************

            TH 1      TH 2      TH 3      TH 4      TH 5      TH 6      TH 7      OM11      OM12      OM13      OM22      OM23
             OM33      SG11      SG12      SG22
 TH 1
+        1.48E+06
 TH 2
+        1.00E+00  5.47E+05
 TH 3
+        1.00E+00  1.00E+00  1.03E+03
 TH 4
+       -9.96E-01 -9.96E-01 -9.96E-01  2.17E+00
 TH 5
+        1.00E+00  1.00E+00  1.00E+00 -9.96E-01  4.58E+01
 TH 6
+       -1.00E+00 -1.00E+00 -1.00E+00  9.97E-01 -1.00E+00  7.41E+01
 TH 7
+       -9.99E-01 -9.99E-01 -9.98E-01  9.99E-01 -9.99E-01  9.99E-01  1.18E+01
 OM11
+        1.00E+00  1.00E+00  1.00E+00 -9.96E-01  1.00E+00 -1.00E+00 -9.99E-01  1.81E+01
 OM12
+        1.00E+00  1.00E+00  1.00E+00 -9.96E-01  1.00E+00 -1.00E+00 -9.99E-01  1.00E+00  1.93E+01
 OM13
+        1.00E+00  1.00E+00  1.00E+00 -9.96E-01  1.00E+00 -1.00E+00 -9.99E-01  1.00E+00  1.00E+00  6.69E+00
 OM22
+        1.00E+00  1.00E+00  1.00E+00 -9.96E-01  1.00E+00 -1.00E+00 -9.99E-01  1.00E+00  1.00E+00  1.00E+00  2.32E+01
 OM23
+        1.00E+00  1.00E+00  1.00E+00 -9.96E-01  1.00E+00 -1.00E+00 -9.99E-01  1.00E+00  1.00E+00  1.00E+00  1.00E+00  6.48E+00
 OM33
+       -1.00E+00 -1.00E+00 -1.00E+00  9.95E-01 -1.00E+00  1.00E+00  9.98E-01 -1.00E+00 -1.00E+00 -1.00E+00 -1.00E+00 -1.00E+00
          7.14E-01
 SG11
+       -1.00E+00 -1.00E+00 -1.00E+00  9.96E-01 -1.00E+00  1.00E+00  9.99E-01 -1.00E+00 -1.00E+00 -1.00E+00 -1.00E+00 -1.00E+00
          1.00E+00  2.80E-04
 SG12
+       ......... ......... ......... ......... ......... ......... ......... ......... ......... ......... ......... .........
         ......... ......... .........
 SG22
+       -1.00E+00 -1.00E+00 -1.00E+00  9.96E-01 -1.00E+00  1.00E+00  9.99E-01 -1.00E+00 -1.00E+00 -1.00E+00 -1.00E+00 -1.00E+00
          1.00E+00  1.00E+00 .........  1.03E-03
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 Elapsed finaloutput time in seconds:     0.05
 #CPUT: Total CPU Time in Seconds,     1524.797
