Thu 09/05/2024
07:47 PM
$PROBLEM    Dual Numbers benchmark - NONMEM
$ABBR DERIV2=NO
$INPUT       ID TIME AMT DV WT
$DATA      c:/git/adpoBenchmark/data/sim_0_2_0_1.csv IGNORE=@
  ;; data file name must match out file name in the template file for simulations in data folder
  ;;from data\template.txt
  ;; $TABLE ID TIME AMT IOBS EVID WT FILE=c:\git\dual_numbers\data\OUT_0_2_0_1.DAT NOPRINT NOHEADER NOAPPEND
  ;; and file read/write in make_data.r
  ;; file_name <- paste0(this_comp,"_",this_eta,"_",this_vwt,"_",this_gamma)
$SUBROUTINE ADVAN6 TOL=7
$MODEL
  COMP=(DEPOT,DEFDOSE)
  COMP=(CENTRAL,NODOSE,DEFOBS)

$PK
  CWT = WT/70

  TVVMAX= THETA(1)
  VMAX=TVVMAX*EXP(ETA(1))
  TVKM = THETA(2)
  KM = TVKM *EXP(ETA(2))
  TVV2=THETA(3)
  V2=TVV2 *EXP(ETA(3))
  TVKA=THETA(4)
  KA=TVKA

  SC = V2
$ERROR
 IPRED = F

  Y=F*EXP(EPS(2)) + EPS(1)
$DES
  CONC = A(2)/SC
  DADT(1) = -KA*A(1)
  DADT(2) =  KA*A(1)-VMAX*CONC**THETA(5)/(KM**THETA(5)+CONC**THETA(5))

$THETA
  (100,4000)	; THETA(1) VMAX UNITS =  mass/time
  (100,4000)	; THETA(2) KM UNITS = mass/volume
  (1,50) 		; THETA(3) V  UNITS = volume
  (0.01,1.2,3) 		; THETA(4) KA UNITS = 1/time
  (0.0001,1.6,3) 	;; THETA(5) GAMMA

  ;; Start OMEGA
$OMEGA
  0.1		; ETA(1) ETA ON VMAX
  0.1		; ETA(2) ETA ON KM
  0.1		; ETA(3) ETA ON V2
$SIGMA
  (1) ;; EPS(1) ADDITIVE
  (0.3) ;; EPS(2) PROPORTIONAL
$EST METHOD=COND INTER MAXEVALS=9999 NOHABORT NOOMEGABOUNDTEST NOSIGMABOUNDTEST NOTHETABOUNDTEST
$COV UNCOND PRECOND=2
  ;;; Model Identifier =  0,2,0,1

;; Phenotype: ([('COMP', 0), ('ETAs', 2), ('V~WT', 0), ('GAMMA', 1)])
;; Genotype: [0, 2, 0, 1]
;; Num non-influential tokens: 0

$TABLE ID TIME IPRED DV NOAPPEND ONEHEADER NOPRINT FILE= Run1Preds.dat

NM-TRAN MESSAGES
 WARNINGS AND ERRORS (IF ANY) FOR PROBLEM    1
 (WARNING  2) NM-TRAN INFERS THAT THE DATA ARE POPULATION.

1NONLINEAR MIXED EFFECTS MODEL PROGRAM (NONMEM) VERSION 7.4.3
 ORIGINALLY DEVELOPED BY STUART BEAL, LEWIS SHEINER, AND ALISON BOECKMANN
 CURRENT DEVELOPERS ARE ROBERT BAUER, ICON DEVELOPMENT SOLUTIONS,
 AND ALISON BOECKMANN. IMPLEMENTATION, EFFICIENCY, AND STANDARDIZATION
 PERFORMED BY NOUS INFOSYSTEMS.
 PROBLEM NO.:         1
 Dual Numbers benchmark - NONMEM
 TOT. NO. OF OBS RECS:      420
 TOT. NO. OF INDIVIDUALS:       60
 GENERAL NONLINEAR KINETICS MODEL (DVERK1, ADVAN6)
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 #TBLN:      1
 #METH: First Order Conditional Estimation with Interaction
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
 #TERM:
0MINIMIZATION SUCCESSFUL
 HOWEVER, PROBLEMS OCCURRED WITH THE MINIMIZATION.
 REGARD THE RESULTS OF THE ESTIMATION STEP CAREFULLY, AND ACCEPT THEM ONLY
 AFTER CHECKING THAT THE COVARIANCE STEP PRODUCES REASONABLE OUTPUT.
 NO. OF FUNCTION EVALUATIONS USED:      589
 NO. OF SIG. DIGITS IN FINAL EST.:  3.7

 ETABAR IS THE ARITHMETIC MEAN OF THE ETA-ESTIMATES,
 AND THE P-VALUE IS GIVEN FOR THE NULL HYPOTHESIS THAT THE TRUE MEAN IS 0.

 ETABAR:        -9.4034E-03 -1.8544E-02 -1.2488E-02
 SE:             3.6042E-02  3.9569E-02  4.4671E-02
 N:                      60          60          60

 P VAL.:         7.9417E-01  6.3931E-01  7.7981E-01

 ETASHRINKSD(%)  2.1526E+01  2.2254E+01  1.0072E+01
 ETASHRINKVR(%)  3.8419E+01  3.9555E+01  1.9130E+01
 EBVSHRINKSD(%)  2.2075E+01  2.3631E+01  1.0074E+01
 EBVSHRINKVR(%)  3.9276E+01  4.1678E+01  1.9133E+01
 EPSSHRINKSD(%)  1.0798E+01  1.0798E+01
 EPSSHRINKVR(%)  2.0430E+01  2.0430E+01


 TOTAL DATA POINTS NORMALLY DISTRIBUTED (N):          420
 N*LOG(2PI) CONSTANT TO OBJECTIVE FUNCTION:    771.90836789192508
 OBJECTIVE FUNCTION VALUE WITHOUT CONSTANT:    5547.5867813397408
 OBJECTIVE FUNCTION VALUE WITH CONSTANT:       6319.4951492316659
 REPORTED OBJECTIVE FUNCTION DOES NOT CONTAIN CONSTANT

 TOTAL EFFECTIVE ETAS (NIND*NETA):                           180


 #TERE:
 Elapsed estimation  time in seconds:   478.62
