Mon 09/16/2024
01:12 PM
$PROBLEM    Dual Numbers benchmark
$INPUT       ID TIME AMT DV WT
  ;; $DATA      c:/git/adpoBenchmark/data/sim_2_3_0_1.csv IGNORE=@
$DATA      D:/git/adpoBenchmark/data/sim_2_3_0_1.csv IGNORE=@

$SUBROUTINE ADVAN6 TOL=7
$MODEL
  COMP=(DEPOT,DEFDOSE)
  COMP=(CENTRAL,NODOSE,DEFOBS)
  COMP=(PERI1,NODOSE)
  COMP=(PERI2,NODOSE)
$PK
  CWT = WT/70

  TVVMAX= THETA(1)
  VMAX=TVVMAX*EXP(ETA(1))
  TVKM = THETA(2)
  KM = TVKM *EXP(ETA(2))
  TVV2=THETA(3)
  V2=TVV2 *EXP(ETA(3))
  TVKA=THETA(4)
  KA=TVKA *EXP(ETA(4))
  K23=THETA(6)
  K32=THETA(7)
  K24=THETA(8)
  K42=THETA(9)
  SC = V2
$ERROR
  IPRED = F
  Y=F*EXP(EPS(2)) + EPS(1)
$DES
  CONC = A(2)/SC
  DADT(1) = -KA*A(1)
  DADT(2) =  KA*A(1)-VMAX*CONC**THETA(5)/(KM**THETA(5)+CONC**THETA(5)) -K23*A(2)+K32*A(3) -K24*A(2)+K42*A(4)
  DADT(3) = K23*A(2)-K32*A(3)
  DADT(4) = K24*A(2)-K42*A(4)

$THETA
  (100,4000)	; THETA(1) VMAX UNITS =  MG/HR
  (100,4000)	; THETA(2) KM UNITS =  CONC
  (0,50) 	; THETA(3) V  UNITS = L
  (0,1.2) 	; THETA(4) KA UNITS = 1/HR
  (0,1.7) 	;; THETA(5) GAMMA

  (0,2)	 ;; THETA(6) K23
  (0,3)	 ;; THETA(7) K32
  (0.0001,0.1,10) 	 ;; THETA(8) K24
  (0.0001,0.05,10) 	 ;; THETA(9) K42
; empty $OMEGA
$OMEGA
  0.3		; ETA(1) ETA ON VMAX
  0.3		; ETA(2) ETA ON KM
  0.3		; ETA(3) ETA ON V2
  0.3		; ETA(4) ETA ON KA
$SIGMA
  (1) ;; EPS(1) ADDITIVE
  (0.3) ;; EPS(2) PROPORTIONAL
  $EST METHOD=COND INTER MAXEVALS=9999 NOHABORT NOOMEGABOUNDTEST NOSIGMABOUNDTEST NOTHETABOUNDTEST
  $COV UNCOND PRECOND=2
  ;;; Model Identifier =  2,3,0,1

$TABLE ID TIME IPRED DV NOAPPEND ONEHEADER NOPRINT FILE= Run1Preds.dat
;; Phenotype: ([('COMP', 2), ('ETAs', 3), ('V~WT', 0), ('GAMMA', 1)])
;; Genotype: [2, 3, 0, 1]
;; Num non-influential tokens: 0

NM-TRAN MESSAGES
 WARNINGS AND ERRORS (IF ANY) FOR PROBLEM    1
 (WARNING  2) NM-TRAN INFERS THAT THE DATA ARE POPULATION.

1NONLINEAR MIXED EFFECTS MODEL PROGRAM (NONMEM) VERSION 7.4.3
 ORIGINALLY DEVELOPED BY STUART BEAL, LEWIS SHEINER, AND ALISON BOECKMANN
 CURRENT DEVELOPERS ARE ROBERT BAUER, ICON DEVELOPMENT SOLUTIONS,
 AND ALISON BOECKMANN. IMPLEMENTATION, EFFICIENCY, AND STANDARDIZATION
 PERFORMED BY NOUS INFOSYSTEMS.
 PROBLEM NO.:         1
 Dual Numbers benchmark
 TOT. NO. OF OBS RECS:      480
 TOT. NO. OF INDIVIDUALS:       60
 GENERAL NONLINEAR KINETICS MODEL (DVERK1, ADVAN6)
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 #TBLN:      1
 #METH: First Order Conditional Estimation with Interaction
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
 #TERM:
0MINIMIZATION TERMINATED
 DUE TO ROUNDING ERRORS (ERROR=134)
 NO. OF FUNCTION EVALUATIONS USED:     2688
 NO. OF SIG. DIGITS UNREPORTABLE
0PARAMETER ESTIMATE IS NEAR ITS BOUNDARY

 ETABAR IS THE ARITHMETIC MEAN OF THE ETA-ESTIMATES,
 AND THE P-VALUE IS GIVEN FOR THE NULL HYPOTHESIS THAT THE TRUE MEAN IS 0.

 ETABAR:        -2.6162E-02 -1.4969E-02 -9.9041E-03  7.6241E-10
 SE:             2.7283E-02  3.3348E-02  4.5187E-02  8.3024E-09
 N:                      60          60          60          60

 P VAL.:         3.3761E-01  6.5351E-01  8.2651E-01  9.2683E-01

 ETASHRINKSD(%)  4.4937E+01  1.5861E+01  1.7165E+01  9.9963E+01
 ETASHRINKVR(%)  6.9681E+01  2.9206E+01  3.1383E+01  1.0000E+02
 EBVSHRINKSD(%)  4.4762E+01  1.8313E+01  1.7641E+01  9.9963E+01
 EBVSHRINKVR(%)  6.9487E+01  3.3273E+01  3.2170E+01  1.0000E+02
 EPSSHRINKSD(%)  7.7954E+00  7.7954E+00
 EPSSHRINKVR(%)  1.4983E+01  1.4983E+01


 TOTAL DATA POINTS NORMALLY DISTRIBUTED (N):          480
 N*LOG(2PI) CONSTANT TO OBJECTIVE FUNCTION:    882.18099187648579
 OBJECTIVE FUNCTION VALUE WITHOUT CONSTANT:    5843.4264063789960
 OBJECTIVE FUNCTION VALUE WITH CONSTANT:       6725.6073982554817
 REPORTED OBJECTIVE FUNCTION DOES NOT CONTAIN CONSTANT

 TOTAL EFFECTIVE ETAS (NIND*NETA):                           240


 #TERE:
 Elapsed estimation  time in seconds:  7124.24
 TESTING R MATRIX FOR POSITIVE DEFINITNESS
 R MATRIX IS NOT POSITIVE DEFINITE
 PRECONDITIONING CYCLE NO.            1
 TESTING R MATRIX FOR POSITIVE DEFINITNESS
 R MATRIX IS NOT POSITIVE DEFINITE
 PRECONDITIONING CYCLE NO.            2
0S MATRIX ALGORITHMICALLY SINGULAR
0S MATRIX IS OUTPUT
0INVERSE COVARIANCE MATRIX SET TO RS*RMAT, WHERE S* IS A PSEUDO INVERSE OF S
 Elapsed covariance  time in seconds:  5619.46
 Elapsed postprocess time in seconds:     5.93

 ********************               FIRST ORDER CONDITIONAL ESTIMATION WITH INTERACTION              ********************
 #OBJT:**************                       MINIMUM VALUE OF OBJECTIVE FUNCTION                      ********************
 #OBJV:********************************************     5843.426       **************************************************

 ********************               FIRST ORDER CONDITIONAL ESTIMATION WITH INTERACTION              ********************
 ********************                             FINAL PARAMETER ESTIMATE                           ********************

 THETA - VECTOR OF FIXED EFFECTS PARAMETERS   *********
         TH 1      TH 2      TH 3      TH 4      TH 5      TH 6      TH 7      TH 8      TH 9
         6.64E+03  7.23E+02  1.05E+01  2.11E-01  3.40E+00  1.10E+00  2.25E-01  1.00E-04  1.00E-04

 OMEGA - COV MATRIX FOR RANDOM EFFECTS - ETAS  ********
         ETA1      ETA2      ETA3      ETA4
 ETA1
+        1.50E-01
 ETA2
+        0.00E+00  9.58E-02
 ETA3
+        0.00E+00  0.00E+00  1.82E-01
 ETA4
+        0.00E+00  0.00E+00  0.00E+00  3.09E-08

 SIGMA - COV MATRIX FOR RANDOM EFFECTS - EPSILONS  ****
         EPS1      EPS2
 EPS1
+        2.05E+02
 EPS2
+        0.00E+00  2.24E-01

 OMEGA - CORR MATRIX FOR RANDOM EFFECTS - ETAS  *******
         ETA1      ETA2      ETA3      ETA4
 ETA1
+        3.87E-01
 ETA2
+        0.00E+00  3.10E-01
 ETA3
+        0.00E+00  0.00E+00  4.26E-01
 ETA4
+        0.00E+00  0.00E+00  0.00E+00  1.76E-04

 SIGMA - CORR MATRIX FOR RANDOM EFFECTS - EPSILONS  ***
         EPS1      EPS2
 EPS1
+        1.43E+01
 EPS2
+        0.00E+00  4.73E-01

 ********************               FIRST ORDER CONDITIONAL ESTIMATION WITH INTERACTION              ********************
 ********************                            STANDARD ERROR OF ESTIMATE                          ********************

 THETA - VECTOR OF FIXED EFFECTS PARAMETERS   *********
         TH 1      TH 2      TH 3      TH 4      TH 5      TH 6      TH 7      TH 8      TH 9
         1.95E+03  9.75E+01  4.49E+00  9.20E-02  5.00E-01  3.30E-01  1.16E-01  0.00E+00  0.00E+00

 OMEGA - COV MATRIX FOR RANDOM EFFECTS - ETAS  ********
         ETA1      ETA2      ETA3      ETA4
 ETA1
+        9.98E-02
 ETA2
+       .........  2.94E-02
 ETA3
+       ......... .........  7.04E-02
 ETA4
+       ......... ......... .........  4.39E-05

 SIGMA - COV MATRIX FOR RANDOM EFFECTS - EPSILONS  ****
         EPS1      EPS2
 EPS1
+        1.02E+01
 EPS2
+       .........  6.85E-05

 OMEGA - CORR MATRIX FOR RANDOM EFFECTS - ETAS  *******
         ETA1      ETA2      ETA3      ETA4
 ETA1
+        1.29E-01
 ETA2
+       .........  4.75E-02
 ETA3
+       ......... .........  8.26E-02
 ETA4
+       ......... ......... .........  1.25E-01

 SIGMA - CORR MATRIX FOR RANDOM EFFECTS - EPSILONS  ***
         EPS1      EPS2
 EPS1
+        3.56E-01
 EPS2
+       .........  7.24E-05
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 Elapsed finaloutput time in seconds:     0.17
 #CPUT: Total CPU Time in Seconds,    12411.438
