Tue 10/08/2024
08:37 AM
$SIZES MAXFCN = 5000000
$PROBLEM    Dual Numbers benchmark
$INPUT       ID TIME AMT DV WT
  ;; $DATA      c:/git/adpoBenchmark/data/sim_0_5_1_1.csv IGNORE=@
$DATA      d:/git/adpobenchmark/data/sim_0_5_1_1.csv IGNORE=@

$SUBROUTINE ADVAN6 TOL=7
$MODEL
  COMP=(DEPOT,DEFDOSE)
  COMP=(CENTRAL,NODOSE,DEFOBS)

$PK
  CWT = WT/70

  TVVMAX= THETA(1)
  VMAX=TVVMAX*EXP(ETA(1))
  TVKM = THETA(2)
  KM = TVKM *EXP(ETA(2))
  TVV2=THETA(3) *CWT**THETA(6)
  V2=TVV2 *EXP(ETA(3))
  TVKA=THETA(4)
  KA=TVKA

  SC = V2
$ERROR
  IPRED = F
  Y=F*EXP(EPS(2)) + EPS(1)
$DES
  CONC = A(2)/SC
  DADT(1) = -KA*A(1)
  DADT(2) =  KA*A(1)-VMAX*CONC**THETA(5)/(KM**THETA(5)+CONC**THETA(5))

$THETA
  (100,4000)	; THETA(1) VMAX UNITS =  MG/HR
  (100,4000)	; THETA(2) KM UNITS =  CONC
  (0,50) 	; THETA(3) V  UNITS = L
  (0,1.2) 	; THETA(4) KA UNITS = 1/HR
  (0,1.6) 	;; THETA(5) GAMMA
  (0,1.1) 	;; THETA(6) V~WT
; empty $OMEGA
$OMEGA BLOCK(3)
  0.1		; ETA(1) ETA ON VMAX
  0.05 0.1		; ETA(2) ETA ON KM
  0.05 0.05 0.1		; ETA(3) ETA ON V2
$SIGMA
  (1) ;; EPS(1) ADDITIVE
  (0.3) ;; EPS(2) PROPORTIONAL
  $EST METHOD=COND INTER MAXEVALS=9999 NOHABORT NOOMEGABOUNDTEST NOSIGMABOUNDTEST NOTHETABOUNDTEST
  $COV UNCOND PRECOND=2
  ;;; Model Identifier =  0,5,1,1

$TABLE ID TIME IPRED DV NOAPPEND ONEHEADER NOPRINT FILE= Run1Preds.dat

;; Phenotype: ([('COMP', 0), ('ETAs', 5), ('V~WT', 1), ('GAMMA', 1)])
;; Genotype: [0, 5, 1, 1]
;; Num non-influential tokens: 0

NM-TRAN MESSAGES
 WARNINGS AND ERRORS (IF ANY) FOR PROBLEM    1
 (WARNING  2) NM-TRAN INFERS THAT THE DATA ARE POPULATION.

1NONLINEAR MIXED EFFECTS MODEL PROGRAM (NONMEM) VERSION 7.4.3
 ORIGINALLY DEVELOPED BY STUART BEAL, LEWIS SHEINER, AND ALISON BOECKMANN
 CURRENT DEVELOPERS ARE ROBERT BAUER, ICON DEVELOPMENT SOLUTIONS,
 AND ALISON BOECKMANN. IMPLEMENTATION, EFFICIENCY, AND STANDARDIZATION
 PERFORMED BY NOUS INFOSYSTEMS.
 PROBLEM NO.:         1
 Dual Numbers benchmark
 TOT. NO. OF OBS RECS:      480
 TOT. NO. OF INDIVIDUALS:       60
 GENERAL NONLINEAR KINETICS MODEL (DVERK1, ADVAN6)
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 #TBLN:      1
 #METH: First Order Conditional Estimation with Interaction
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
 #TERM:
0MINIMIZATION TERMINATED
 DUE TO ROUNDING ERRORS (ERROR=134)
 NO. OF FUNCTION EVALUATIONS USED:     1890
 NO. OF SIG. DIGITS UNREPORTABLE

 ETABAR IS THE ARITHMETIC MEAN OF THE ETA-ESTIMATES,
 AND THE P-VALUE IS GIVEN FOR THE NULL HYPOTHESIS THAT THE TRUE MEAN IS 0.

 ETABAR:        -2.2322E-02 -2.8388E-02 -9.7186E-03
 SE:             4.4014E-02  6.1611E-02  5.3936E-02
 N:                      60          60          60

 P VAL.:         6.1204E-01  6.4497E-01  8.5700E-01

 ETASHRINKSD(%)  2.8347E+01  1.7248E+01  7.9582E+00
 ETASHRINKVR(%)  4.8658E+01  3.1521E+01  1.5283E+01
 EBVSHRINKSD(%)  2.9953E+01  1.9833E+01  8.1513E+00
 EBVSHRINKVR(%)  5.0935E+01  3.5733E+01  1.5638E+01
 EPSSHRINKSD(%)  9.8880E+00  9.8880E+00
 EPSSHRINKVR(%)  1.8798E+01  1.8798E+01


 TOTAL DATA POINTS NORMALLY DISTRIBUTED (N):          480
 N*LOG(2PI) CONSTANT TO OBJECTIVE FUNCTION:    882.18099187648579
 OBJECTIVE FUNCTION VALUE WITHOUT CONSTANT:    6146.1951934896542
 OBJECTIVE FUNCTION VALUE WITH CONSTANT:       7028.3761853661399
 REPORTED OBJECTIVE FUNCTION DOES NOT CONTAIN CONSTANT

 TOTAL EFFECTIVE ETAS (NIND*NETA):                           180


 #TERE:
 Elapsed estimation  time in seconds:  3897.79
 TESTING R MATRIX FOR POSITIVE DEFINITNESS
 R MATRIX IS NOT POSITIVE DEFINITE
 PRECONDITIONING CYCLE NO.            1
 TESTING R MATRIX FOR POSITIVE DEFINITNESS
 R MATRIX IS NOT POSITIVE DEFINITE
 PRECONDITIONING CYCLE NO.            2
0S MATRIX ALGORITHMICALLY SINGULAR
0S MATRIX IS OUTPUT
0INVERSE COVARIANCE MATRIX SET TO RS*RMAT, WHERE S* IS A PSEUDO INVERSE OF S
 Elapsed covariance  time in seconds:  3018.82
 Elapsed postprocess time in seconds:     4.91

 ********************               FIRST ORDER CONDITIONAL ESTIMATION WITH INTERACTION              ********************
 #OBJT:**************                       MINIMUM VALUE OF OBJECTIVE FUNCTION                      ********************
 #OBJV:********************************************     6146.195       **************************************************

 ********************               FIRST ORDER CONDITIONAL ESTIMATION WITH INTERACTION              ********************
 ********************                             FINAL PARAMETER ESTIMATE                           ********************

 THETA - VECTOR OF FIXED EFFECTS PARAMETERS   *********
         TH 1      TH 2      TH 3      TH 4      TH 5      TH 6
         3.60E+03  8.43E+02  7.46E+01  1.10E+00  1.70E+00  1.45E-01

 OMEGA - COV MATRIX FOR RANDOM EFFECTS - ETAS  ********
         ETA1      ETA2      ETA3
 ETA1
+        2.30E-01
 ETA2
+        2.23E-01  3.38E-01
 ETA3
+        2.75E-02  3.88E-03  2.10E-01

 SIGMA - COV MATRIX FOR RANDOM EFFECTS - EPSILONS  ****
         EPS1      EPS2
 EPS1
+        9.20E-25
 EPS2
+        0.00E+00  2.24E-01

 OMEGA - CORR MATRIX FOR RANDOM EFFECTS - ETAS  *******
         ETA1      ETA2      ETA3
 ETA1
+        4.80E-01
 ETA2
+        8.00E-01  5.82E-01
 ETA3
+        1.25E-01  1.46E-02  4.58E-01

 SIGMA - CORR MATRIX FOR RANDOM EFFECTS - EPSILONS  ***
         EPS1      EPS2
 EPS1
+        9.59E-13
 EPS2
+        0.00E+00  4.74E-01

 ********************               FIRST ORDER CONDITIONAL ESTIMATION WITH INTERACTION              ********************
 ********************                            STANDARD ERROR OF ESTIMATE                          ********************

 THETA - VECTOR OF FIXED EFFECTS PARAMETERS   *********
         TH 1      TH 2      TH 3      TH 4      TH 5      TH 6
         1.15E+03  3.50E+02  2.46E+01  1.21E-01  1.80E-01  7.72E-02

 OMEGA - COV MATRIX FOR RANDOM EFFECTS - ETAS  ********
         ETA1      ETA2      ETA3
 ETA1
+        1.67E-01
 ETA2
+        1.59E-01  1.41E-01
 ETA3
+        4.52E-02  5.26E-02  4.29E-02

 SIGMA - COV MATRIX FOR RANDOM EFFECTS - EPSILONS  ****
         EPS1      EPS2
 EPS1
+        0.00E+00
 EPS2
+       .........  1.70E-02

 OMEGA - CORR MATRIX FOR RANDOM EFFECTS - ETAS  *******
         ETA1      ETA2      ETA3
 ETA1
+        1.74E-01
 ETA2
+        1.43E-01  1.21E-01
 ETA3
+        2.06E-01  1.99E-01  4.69E-02

 SIGMA - CORR MATRIX FOR RANDOM EFFECTS - EPSILONS  ***
         EPS1      EPS2
 EPS1
+        0.00E+00
 EPS2
+       .........  1.79E-02

 ********************               FIRST ORDER CONDITIONAL ESTIMATION WITH INTERACTION              ********************
 ********************                          COVARIANCE MATRIX OF ESTIMATE                         ********************

            TH 1      TH 2      TH 3      TH 4      TH 5      TH 6      OM11      OM12      OM13      OM22      OM23      OM33
             SG11      SG12      SG22
 TH 1
+        1.33E+06
 TH 2
+        3.97E+05  1.23E+05
 TH 3
+       -1.00E+04 -2.99E+03  6.05E+02
 TH 4
+       -8.59E+01 -2.70E+01  2.58E+00  1.46E-02
 TH 5
+       -1.87E+02 -5.92E+01  9.49E-01  1.17E-02  3.23E-02
 TH 6
+       -2.90E+01 -8.58E+00  1.88E+00  8.34E-03  2.57E-03  5.96E-03
 OM11
+        1.78E+02  5.39E+01 -1.92E+00 -1.37E-02 -2.52E-02 -5.70E-03  2.80E-02
 OM12
+        1.61E+02  4.85E+01 -1.73E+00 -1.19E-02 -2.26E-02 -5.04E-03  2.58E-02  2.52E-02
 OM13
+        1.56E+01  4.32E+00  6.40E-02 -5.66E-04 -2.48E-03  1.56E-04  1.33E-03  3.04E-04  2.05E-03
 OM22
+        1.10E+02  3.28E+01 -1.31E+00 -7.83E-03 -1.48E-02 -3.71E-03  1.90E-02  2.03E-02 -1.06E-03  1.98E-02
 OM23
+       -6.86E+00 -2.58E+00  2.72E-01  1.33E-03  5.54E-04  8.36E-04 -1.71E-03 -2.46E-03  1.88E-03 -3.37E-03  2.76E-03
 OM33
+       -6.77E+00 -2.23E+00  1.24E-01  1.03E-03  9.47E-04  4.56E-04 -9.29E-04 -4.97E-04 -4.23E-04  1.49E-04 -2.80E-04  1.84E-03
 SG11
+        0.00E+00  0.00E+00  0.00E+00  0.00E+00  0.00E+00  0.00E+00  0.00E+00  0.00E+00  0.00E+00  0.00E+00  0.00E+00  0.00E+00
          0.00E+00
 SG12
+       ......... ......... ......... ......... ......... ......... ......... ......... ......... ......... ......... .........
         ......... .........
 SG22
+       -4.61E+00 -1.29E+00  1.13E-01  5.21E-04  4.92E-04  3.99E-04 -8.77E-04 -8.34E-04  1.03E-04 -7.48E-04  1.71E-04  6.74E-05
          0.00E+00 .........  2.89E-04

 ********************               FIRST ORDER CONDITIONAL ESTIMATION WITH INTERACTION              ********************
 ********************                          CORRELATION MATRIX OF ESTIMATE                        ********************

            TH 1      TH 2      TH 3      TH 4      TH 5      TH 6      OM11      OM12      OM13      OM22      OM23      OM33
             SG11      SG12      SG22
 TH 1
+        1.15E+03
 TH 2
+        9.86E-01  3.50E+02
 TH 3
+       -3.53E-01 -3.47E-01  2.46E+01
 TH 4
+       -6.17E-01 -6.36E-01  8.66E-01  1.21E-01
 TH 5
+       -9.03E-01 -9.40E-01  2.14E-01  5.38E-01  1.80E-01
 TH 6
+       -3.26E-01 -3.17E-01  9.87E-01  8.93E-01  1.85E-01  7.72E-02
 OM11
+        9.26E-01  9.20E-01 -4.66E-01 -6.77E-01 -8.37E-01 -4.41E-01  1.67E-01
 OM12
+        8.80E-01  8.72E-01 -4.42E-01 -6.21E-01 -7.91E-01 -4.11E-01  9.73E-01  1.59E-01
 OM13
+        3.00E-01  2.73E-01  5.75E-02 -1.03E-01 -3.05E-01  4.46E-02  1.76E-01  4.24E-02  4.52E-02
 OM22
+        6.78E-01  6.65E-01 -3.79E-01 -4.59E-01 -5.84E-01 -3.41E-01  8.06E-01  9.06E-01 -1.67E-01  1.41E-01
 OM23
+       -1.13E-01 -1.40E-01  2.10E-01  2.09E-01  5.86E-02  2.06E-01 -1.95E-01 -2.95E-01  7.90E-01 -4.55E-01  5.26E-02
 OM33
+       -1.37E-01 -1.48E-01  1.17E-01  1.99E-01  1.23E-01  1.38E-01 -1.29E-01 -7.30E-02 -2.18E-01  2.47E-02 -1.24E-01  4.29E-02
 SG11
+        0.00E+00  0.00E+00  0.00E+00  0.00E+00  0.00E+00  0.00E+00  0.00E+00  0.00E+00  0.00E+00  0.00E+00  0.00E+00  0.00E+00
          0.00E+00
 SG12
+       ......... ......... ......... ......... ......... ......... ......... ......... ......... ......... ......... .........
         ......... .........
 SG22
+       -2.36E-01 -2.17E-01  2.69E-01  2.53E-01  1.61E-01  3.04E-01 -3.08E-01 -3.09E-01  1.34E-01 -3.12E-01  1.92E-01  9.24E-02
          0.00E+00 .........  1.70E-02
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 Elapsed finaloutput time in seconds:     0.11
 #CPUT: Total CPU Time in Seconds,     5408.422
