Tue 09/17/2024
05:12 AM
$PROBLEM    Dual Numbers benchmark
$INPUT       ID TIME AMT DV WT
  ;; $DATA      c:/git/adpoBenchmark/data/sim_1_0_1_1.csv IGNORE=@
$DATA      D:/git/adpoBenchmark/data/sim_1_0_1_1.csv IGNORE=@

$SUBROUTINE ADVAN6 TOL=7
$MODEL
  COMP=(DEPOT,DEFDOSE)
  COMP=(CENTRAL,NODOSE,DEFOBS)
  COMP=(PERI,NODOSE)
$PK
  CWT = WT/70

  TVVMAX= THETA(1)
  VMAX=TVVMAX*EXP(ETA(1))
  TVKM = THETA(2)
  KM = TVKM
  TVV2=THETA(3) *CWT**THETA(6)
  V2=TVV2
  TVKA=THETA(4)
  KA=TVKA
  K23=THETA(7)
  K32=THETA(8)
  SC = V2
$ERROR
  IPRED = F
  Y=F*EXP(EPS(2)) + EPS(1)
$DES
  CONC = A(2)/SC
  DADT(1) = -KA*A(1)
  DADT(2) =  KA*A(1)-VMAX*CONC**THETA(5)/(KM**THETA(5)+CONC**THETA(5)) -K23*A(2)+K32*A(3)
  DADT(3) = K23*A(2)-K32*A(3)

$THETA
  (100,4000)	; THETA(1) VMAX UNITS =  MG/HR
  (100,4000)	; THETA(2) KM UNITS =  CONC
  (0,50) 	; THETA(3) V  UNITS = L
  (0,1.2) 	; THETA(4) KA UNITS = 1/HR
  (0,1.7) 	;; THETA(5) GAMMA
  (0,1.1) 	;; THETA(6) V~WT
  (0,2)	 ;; THETA(7) K23
  (0,3)	 ;; THETA(8) K32
; empty $OMEGA
$OMEGA
  0.3		; ETA(1) ETA ON VMAX
$SIGMA
  (1) ;; EPS(1) ADDITIVE
  (0.3) ;; EPS(2) PROPORTIONAL
  $EST METHOD=COND INTER MAXEVALS=9999 NOHABORT NOOMEGABOUNDTEST NOSIGMABOUNDTEST NOTHETABOUNDTEST
  $COV UNCOND PRECOND=2
  ;;; Model Identifier =  1,0,1,1

$TABLE ID TIME IPRED DV NOAPPEND ONEHEADER NOPRINT FILE= Run1Preds.dat
;; Phenotype: ([('COMP', 1), ('ETAs', 0), ('V~WT', 1), ('GAMMA', 1)])
;; Genotype: [1, 0, 1, 1]
;; Num non-influential tokens: 0

NM-TRAN MESSAGES
 WARNINGS AND ERRORS (IF ANY) FOR PROBLEM    1
 (WARNING  2) NM-TRAN INFERS THAT THE DATA ARE POPULATION.

1NONLINEAR MIXED EFFECTS MODEL PROGRAM (NONMEM) VERSION 7.4.3
 ORIGINALLY DEVELOPED BY STUART BEAL, LEWIS SHEINER, AND ALISON BOECKMANN
 CURRENT DEVELOPERS ARE ROBERT BAUER, ICON DEVELOPMENT SOLUTIONS,
 AND ALISON BOECKMANN. IMPLEMENTATION, EFFICIENCY, AND STANDARDIZATION
 PERFORMED BY NOUS INFOSYSTEMS.
 PROBLEM NO.:         1
 Dual Numbers benchmark
 TOT. NO. OF OBS RECS:      480
 TOT. NO. OF INDIVIDUALS:       60
 GENERAL NONLINEAR KINETICS MODEL (DVERK1, ADVAN6)
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 #TBLN:      1
 #METH: First Order Conditional Estimation with Interaction
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
 #TERM:
0MINIMIZATION TERMINATED
 DUE TO ZERO GRADIENT

 NO. OF SIG. DIGITS IS EFFECTIVELY INFINITE
 HOWEVER, IT IS ADVISABLE TO REGARD THESE RESULTS CAREFULLY BEFORE ACCEPTING THEM
 NO. OF FUNCTION EVALUATIONS USED:      263
 NO. OF SIG. DIGITS UNREPORTABLE

 ETABAR IS THE ARITHMETIC MEAN OF THE ETA-ESTIMATES,
 AND THE P-VALUE IS GIVEN FOR THE NULL HYPOTHESIS THAT THE TRUE MEAN IS 0.

 ETABAR:         0.0000E+00
 SE:             0.0000E+00
 N:                      60

 P VAL.:         1.0000E+00

 ETASHRINKSD(%)  1.0000E+02
 ETASHRINKVR(%)  1.0000E+02
 EBVSHRINKSD(%)         NaN
 EBVSHRINKVR(%)         NaN
 EPSSHRINKSD(%)  1.0000E+02  1.0000E+02
 EPSSHRINKVR(%)  1.0000E+02  1.0000E+02


 TOTAL DATA POINTS NORMALLY DISTRIBUTED (N):            0
 N*LOG(2PI) CONSTANT TO OBJECTIVE FUNCTION:    0.0000000000000000
 OBJECTIVE FUNCTION VALUE WITHOUT CONSTANT:   1.34078079299425956E+154
 OBJECTIVE FUNCTION VALUE WITH CONSTANT:      1.34078079299425956E+154
 REPORTED OBJECTIVE FUNCTION DOES NOT CONTAIN CONSTANT

 TOTAL EFFECTIVE ETAS (NIND*NETA):                            60


 #TERE:
 Elapsed estimation  time in seconds:   411.62

0PRED EXIT CODE = 1
0INDIVIDUAL NO.       1   ID= 1.00000000000000E+00   (WITHIN-INDIVIDUAL) DATA REC NO.   1
 THETA=
  9.05E+07   7.12E+03   9.72E+01   6.34E-09   4.08E+06   1.11E+04   2.02E-21   1.28E-23
 PK PARAMETER FOR OBSERVATION COMPARTMENT'S SCALE IS NON-POSITIVE
0PROGRAM TERMINATED BY OBJ
 Elapsed covariance  time in seconds:     0.00

0PRED EXIT CODE = 1
0INDIVIDUAL NO.       1   ID= 1.00000000000000E+00   (WITHIN-INDIVIDUAL) DATA REC NO.   1
 THETA=
  8.87E+07   7.12E+03   9.72E+01   6.34E-09   4.08E+06   1.11E+04   2.02E-21   1.28E-23
 PK PARAMETER FOR OBSERVATION COMPARTMENT'S SCALE IS NON-POSITIVE
0PROGRAM TERMINATED BY OBJ
 MESSAGE ISSUED FROM COVARIANCE STEP

 ********************               FIRST ORDER CONDITIONAL ESTIMATION WITH INTERACTION              ********************
 #OBJT:**************                       MINIMUM VALUE OF OBJECTIVE FUNCTION                      ********************
 #OBJV:*********************************************************       **************************************************

 ********************               FIRST ORDER CONDITIONAL ESTIMATION WITH INTERACTION              ********************
 ********************                             FINAL PARAMETER ESTIMATE                           ********************

 THETA - VECTOR OF FIXED EFFECTS PARAMETERS   *********
         TH 1      TH 2      TH 3      TH 4      TH 5      TH 6      TH 7      TH 8
         8.87E+07  7.12E+03  9.72E+01  6.34E-09  4.08E+06  1.11E+04  2.02E-21  1.28E-23

 OMEGA - COV MATRIX FOR RANDOM EFFECTS - ETAS  ********
         ETA1
 ETA1
+        8.17E+07

 SIGMA - COV MATRIX FOR RANDOM EFFECTS - EPSILONS  ****
         EPS1      EPS2
 EPS1
+        9.95E-01
 EPS2
+        0.00E+00  5.12E-01

 OMEGA - CORR MATRIX FOR RANDOM EFFECTS - ETAS  *******
         ETA1
 ETA1
+        9.04E+03

 SIGMA - CORR MATRIX FOR RANDOM EFFECTS - EPSILONS  ***
         EPS1      EPS2
 EPS1
+        9.97E-01
 EPS2
+        0.00E+00  7.15E-01
 #CPUT: Total CPU Time in Seconds,      399.953
