Wed 10/09/2024
10:46 AM
$SIZES MAXFCN = 5000000
$PROBLEM    Dual Numbers benchmark
$INPUT       ID TIME AMT DV WT
  ;; $DATA      c:/git/adpoBenchmark/data/sim_2_1_1_1.csv IGNORE=@
$DATA      d:/git/adpobenchmark/data/sim_2_1_1_1.csv IGNORE=@

$SUBROUTINE ADVAN6 TOL=7
$MODEL
  COMP=(DEPOT,DEFDOSE)
  COMP=(CENTRAL,NODOSE,DEFOBS)
  COMP=(PERI1,NODOSE)
  COMP=(PERI2,NODOSE)
$PK
  CWT = WT/70

  TVVMAX= THETA(1)
  VMAX=TVVMAX*EXP(ETA(1))
  TVKM = THETA(2)
  KM = TVKM
  TVV2=THETA(3) *CWT**THETA(6)
  V2=TVV2 *EXP(ETA(2))
  TVKA=THETA(4)
  KA=TVKA
  K23=THETA(7)
  K32=THETA(8)
  K24=THETA(9)
  K42=THETA(10)
  SC = V2
$ERROR
  IPRED = F
  Y=F*EXP(EPS(2)) + EPS(1)
$DES
  CONC = A(2)/SC
  DADT(1) = -KA*A(1)
  DADT(2) =  KA*A(1)-VMAX*CONC**THETA(5)/(KM**THETA(5)+CONC**THETA(5)) -K23*A(2)+K32*A(3) -K24*A(2)+K42*A(4)
  DADT(3) = K23*A(2)-K32*A(3)
  DADT(4) = K24*A(2)-K42*A(4)

$THETA
  (100,4000)	; THETA(1) VMAX UNITS =  MG/HR
  (100,4000)	; THETA(2) KM UNITS =  CONC
  (0,50) 	; THETA(3) V  UNITS = L
  (0,1.2) 	; THETA(4) KA UNITS = 1/HR
  (0,1.6) 	;; THETA(5) GAMMA
  (0,1.1) 	;; THETA(6) V~WT
  (0,0.7)	 ;; THETA(7) K23
  (0,1)	 ;; THETA(8) K32
  (0.0001,0.1) 	 ;; THETA(9) K24
  (0.0001,0.05) 	 ;; THETA(10) K42
; empty $OMEGA
$OMEGA
  0.1		; ETA(1) ETA ON VMAX
  0.1		; ETA(2) ETA ON V2

$SIGMA
  (1) ;; EPS(1) ADDITIVE
  (0.3) ;; EPS(2) PROPORTIONAL
  $EST METHOD=COND INTER MAXEVALS=9999 NOHABORT NOOMEGABOUNDTEST NOSIGMABOUNDTEST NOTHETABOUNDTEST
  $COV UNCOND PRECOND=2
  ;;; Model Identifier =  2,1,1,1

$TABLE ID TIME IPRED DV NOAPPEND ONEHEADER NOPRINT FILE= Run1Preds.dat

;; Phenotype: ([('COMP', 2), ('ETAs', 1), ('V~WT', 1), ('GAMMA', 1)])
;; Genotype: [2, 1, 1, 1]
;; Num non-influential tokens: 0

NM-TRAN MESSAGES
 WARNINGS AND ERRORS (IF ANY) FOR PROBLEM    1
 (WARNING  2) NM-TRAN INFERS THAT THE DATA ARE POPULATION.

1NONLINEAR MIXED EFFECTS MODEL PROGRAM (NONMEM) VERSION 7.4.3
 ORIGINALLY DEVELOPED BY STUART BEAL, LEWIS SHEINER, AND ALISON BOECKMANN
 CURRENT DEVELOPERS ARE ROBERT BAUER, ICON DEVELOPMENT SOLUTIONS,
 AND ALISON BOECKMANN. IMPLEMENTATION, EFFICIENCY, AND STANDARDIZATION
 PERFORMED BY NOUS INFOSYSTEMS.
 PROBLEM NO.:         1
 Dual Numbers benchmark
 TOT. NO. OF OBS RECS:      480
 TOT. NO. OF INDIVIDUALS:       60
 GENERAL NONLINEAR KINETICS MODEL (DVERK1, ADVAN6)
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 #TBLN:      1
 #METH: First Order Conditional Estimation with Interaction
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
 #TERM:
0MINIMIZATION SUCCESSFUL
 HOWEVER, PROBLEMS OCCURRED WITH THE MINIMIZATION.
 REGARD THE RESULTS OF THE ESTIMATION STEP CAREFULLY, AND ACCEPT THEM ONLY
 AFTER CHECKING THAT THE COVARIANCE STEP PRODUCES REASONABLE OUTPUT.
 NO. OF FUNCTION EVALUATIONS USED:     3155
 NO. OF SIG. DIGITS IN FINAL EST.:  3.4

 ETABAR IS THE ARITHMETIC MEAN OF THE ETA-ESTIMATES,
 AND THE P-VALUE IS GIVEN FOR THE NULL HYPOTHESIS THAT THE TRUE MEAN IS 0.

 ETABAR:         7.2721E-03 -1.8873E-02
 SE:             4.9391E-02  5.2524E-02
 N:                      60          60

 P VAL.:         8.8295E-01  7.1935E-01

 ETASHRINKSD(%)  1.7906E+01  8.3649E+00
 ETASHRINKVR(%)  3.2606E+01  1.6030E+01
 EBVSHRINKSD(%)  1.9007E+01  8.7677E+00
 EBVSHRINKVR(%)  3.4401E+01  1.6767E+01
 EPSSHRINKSD(%)  7.4492E+00  7.4492E+00
 EPSSHRINKVR(%)  1.4343E+01  1.4343E+01


 TOTAL DATA POINTS NORMALLY DISTRIBUTED (N):          480
 N*LOG(2PI) CONSTANT TO OBJECTIVE FUNCTION:    882.18099187648579
 OBJECTIVE FUNCTION VALUE WITHOUT CONSTANT:    5786.3232317350430
 OBJECTIVE FUNCTION VALUE WITH CONSTANT:       6668.5042236115287
 REPORTED OBJECTIVE FUNCTION DOES NOT CONTAIN CONSTANT

 TOTAL EFFECTIVE ETAS (NIND*NETA):                           120


 #TERE:
 Elapsed estimation  time in seconds: 12222.75
 TESTING R MATRIX FOR POSITIVE DEFINITNESS
 R MATRIX IS NOT POSITIVE DEFINITE
 PRECONDITIONING CYCLE NO.            1
 TESTING R MATRIX FOR POSITIVE DEFINITNESS
 R MATRIX IS NOT POSITIVE DEFINITE
 PRECONDITIONING CYCLE NO.            2
 Elapsed covariance  time in seconds:  8871.03
 Elapsed postprocess time in seconds:     9.16

 ********************               FIRST ORDER CONDITIONAL ESTIMATION WITH INTERACTION              ********************
 #OBJT:**************                       MINIMUM VALUE OF OBJECTIVE FUNCTION                      ********************
 #OBJV:********************************************     5786.323       **************************************************

 ********************               FIRST ORDER CONDITIONAL ESTIMATION WITH INTERACTION              ********************
 ********************                             FINAL PARAMETER ESTIMATE                           ********************

 THETA - VECTOR OF FIXED EFFECTS PARAMETERS   *********
         TH 1      TH 2      TH 3      TH 4      TH 5      TH 6      TH 7      TH 8      TH 9      TH10
         2.30E+03  4.34E+02  1.19E+02  1.45E+00  3.02E+00  1.04E-01  1.11E-07  7.13E-02  5.00E-02  7.48E-02

 OMEGA - COV MATRIX FOR RANDOM EFFECTS - ETAS  ********
         ETA1      ETA2
 ETA1
+        2.21E-01
 ETA2
+        0.00E+00  2.00E-01

 SIGMA - COV MATRIX FOR RANDOM EFFECTS - EPSILONS  ****
         EPS1      EPS2
 EPS1
+        2.16E-06
 EPS2
+        0.00E+00  2.21E-01

 OMEGA - CORR MATRIX FOR RANDOM EFFECTS - ETAS  *******
         ETA1      ETA2
 ETA1
+        4.70E-01
 ETA2
+        0.00E+00  4.48E-01

 SIGMA - CORR MATRIX FOR RANDOM EFFECTS - EPSILONS  ***
         EPS1      EPS2
 EPS1
+        1.47E-03
 EPS2
+        0.00E+00  4.70E-01

 ********************               FIRST ORDER CONDITIONAL ESTIMATION WITH INTERACTION              ********************
 ********************                            STANDARD ERROR OF ESTIMATE                          ********************

 THETA - VECTOR OF FIXED EFFECTS PARAMETERS   *********
         TH 1      TH 2      TH 3      TH 4      TH 5      TH 6      TH 7      TH 8      TH 9      TH10
         6.29E+02  8.44E+01  4.20E+02  4.78E-01  7.39E-01  9.52E-01  1.91E-05  2.36E+00  3.54E-02  2.54E-02

 OMEGA - COV MATRIX FOR RANDOM EFFECTS - ETAS  ********
         ETA1      ETA2
 ETA1
+        7.78E-02
 ETA2
+       .........  4.13E-02

 SIGMA - COV MATRIX FOR RANDOM EFFECTS - EPSILONS  ****
         EPS1      EPS2
 EPS1
+        4.83E-05
 EPS2
+       .........  1.69E-02

 OMEGA - CORR MATRIX FOR RANDOM EFFECTS - ETAS  *******
         ETA1      ETA2
 ETA1
+        8.28E-02
 ETA2
+       .........  4.62E-02

 SIGMA - CORR MATRIX FOR RANDOM EFFECTS - EPSILONS  ***
         EPS1      EPS2
 EPS1
+        1.64E-02
 EPS2
+       .........  1.80E-02

 ********************               FIRST ORDER CONDITIONAL ESTIMATION WITH INTERACTION              ********************
 ********************                          COVARIANCE MATRIX OF ESTIMATE                         ********************

            TH 1      TH 2      TH 3      TH 4      TH 5      TH 6      TH 7      TH 8      TH 9      TH10      OM11      OM12
             OM22      SG11      SG12      SG22
 TH 1
+        3.96E+05
 TH 2
+        4.34E+04  7.12E+03
 TH 3
+        8.44E+04  1.76E+04  1.76E+05
 TH 4
+        1.02E+02  1.52E+01  1.91E+02  2.28E-01
 TH 5
+        2.00E+01 -3.02E+01 -1.14E+02 -3.61E-02  5.46E-01
 TH 6
+        1.86E+02  4.00E+01  4.00E+02  4.30E-01 -2.68E-01  9.07E-01
 TH 7
+       -4.49E-03 -8.52E-04 -7.96E-03 -8.77E-06  4.83E-06 -1.80E-05  3.65E-10
 TH 8
+       -5.40E+02 -1.04E+02 -9.84E+02 -1.08E+00  6.06E-01 -2.23E+00  4.50E-05  5.55E+00
 TH 9
+       -1.33E+01 -1.51E+00 -1.12E+01 -1.44E-02 -8.78E-04 -2.50E-02  5.61E-07  6.82E-02  1.26E-03
 TH10
+       -5.97E-01 -4.82E-01 -5.17E+00 -6.03E-03  6.70E-03 -1.17E-02  2.74E-07  3.31E-02  5.33E-04  6.46E-04
 OM11
+        4.84E+00 -1.22E+00 -7.24E+00 -1.76E-03  3.25E-02 -1.73E-02  2.92E-07  3.71E-02 -2.28E-04  4.24E-04  6.05E-03
 OM12
+       ......... ......... ......... ......... ......... ......... ......... ......... ......... ......... ......... .........
 OM22
+        8.65E+00  1.14E+00 -1.39E+00 -1.99E-03 -3.02E-04 -3.29E-03  5.07E-08  6.54E-03 -5.94E-05  1.42E-04  2.37E-04 .........
          1.71E-03
 SG11
+        8.03E-03  1.90E-03  2.02E-02  2.16E-05 -1.41E-05  4.60E-05 -9.07E-10 -1.12E-04 -1.22E-06 -5.85E-07 -9.32E-07 .........
         -2.01E-07  2.34E-09
 SG12
+       ......... ......... ......... ......... ......... ......... ......... ......... ......... ......... ......... .........
         ......... ......... .........
 SG22
+        5.74E-02 -6.33E-02  2.48E+00  2.27E-03  8.48E-04  5.65E-03 -1.10E-07 -1.37E-02 -1.56E-04 -4.90E-05 -2.69E-04 .........
         -1.04E-04  3.03E-07 .........  2.86E-04

 ********************               FIRST ORDER CONDITIONAL ESTIMATION WITH INTERACTION              ********************
 ********************                          CORRELATION MATRIX OF ESTIMATE                        ********************

            TH 1      TH 2      TH 3      TH 4      TH 5      TH 6      TH 7      TH 8      TH 9      TH10      OM11      OM12
             OM22      SG11      SG12      SG22
 TH 1
+        6.29E+02
 TH 2
+        8.18E-01  8.44E+01
 TH 3
+        3.19E-01  4.97E-01  4.20E+02
 TH 4
+        3.41E-01  3.77E-01  9.50E-01  4.78E-01
 TH 5
+        4.31E-02 -4.85E-01 -3.66E-01 -1.02E-01  7.39E-01
 TH 6
+        3.10E-01  4.98E-01  1.00E+00  9.45E-01 -3.81E-01  9.52E-01
 TH 7
+       -3.73E-01 -5.28E-01 -9.91E-01 -9.59E-01  3.42E-01 -9.89E-01  1.91E-05
 TH 8
+       -3.64E-01 -5.24E-01 -9.94E-01 -9.59E-01  3.48E-01 -9.92E-01  1.00E+00  2.36E+00
 TH 9
+       -5.96E-01 -5.05E-01 -7.55E-01 -8.51E-01 -3.35E-02 -7.42E-01  8.28E-01  8.17E-01  3.54E-02
 TH10
+       -3.73E-02 -2.25E-01 -4.84E-01 -4.97E-01  3.57E-01 -4.83E-01  5.64E-01  5.53E-01  5.92E-01  2.54E-02
 OM11
+        9.89E-02 -1.85E-01 -2.21E-01 -4.74E-02  5.65E-01 -2.34E-01  1.97E-01  2.02E-01 -8.28E-02  2.15E-01  7.78E-02
 OM12
+       ......... ......... ......... ......... ......... ......... ......... ......... ......... ......... ......... .........
 OM22
+        3.33E-01  3.28E-01 -7.99E-02 -1.01E-01 -9.88E-03 -8.35E-02  6.41E-02  6.71E-02 -4.06E-02  1.35E-01  7.35E-02 .........
          4.13E-02
 SG11
+        2.64E-01  4.66E-01  9.97E-01  9.35E-01 -3.95E-01  9.98E-01 -9.81E-01 -9.85E-01 -7.12E-01 -4.76E-01 -2.48E-01 .........
         -1.01E-01  4.83E-05
 SG12
+       ......... ......... ......... ......... ......... ......... ......... ......... ......... ......... ......... .........
         ......... ......... .........
 SG22
+        5.40E-03 -4.43E-02  3.48E-01  2.80E-01  6.78E-02  3.51E-01 -3.41E-01 -3.44E-01 -2.60E-01 -1.14E-01 -2.04E-01 .........
         -1.49E-01  3.70E-01 .........  1.69E-02
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 Elapsed finaloutput time in seconds:     0.10
 #CPUT: Total CPU Time in Seconds,     9967.266
