$PROBLEM    Dual Numbers benchmark - NONMEM
$ABBR DERIV2=NO
$INPUT       ID TIME AMT DV WT
$DATA      c:/git/adpoBenchmark/data/sim_2_3_1_1.csv IGNORE=@
  ;; data file name must match out file name in the template file for simulations in data folder
  ;;from data\template.txt
  ;; $TABLE ID TIME AMT IOBS EVID WT FILE=c:\git\dual_numbers\data\OUT_2_3_1_1.DAT NOPRINT NOHEADER NOAPPEND
  ;; and file read/write in make_data.r
  ;; file_name <- paste0(this_comp,"_",this_eta,"_",this_vwt,"_",this_gamma)
$SUBROUTINE ADVAN6 TOL=7
$MODEL
  COMP=(DEPOT,DEFDOSE)
  COMP=(CENTRAL,NODOSE,DEFOBS)
  COMP=(PERI1,NODOSE)
  COMP=(PERI2,NODOSE)
$PK
  CWT = WT/70

  TVVMAX= THETA(1)
  VMAX=TVVMAX*EXP(ETA(1))
  TVKM = THETA(2)
  KM = TVKM *EXP(ETA(2))
  TVV2=THETA(3) *CWT**THETA(6)
  V2=TVV2 *EXP(ETA(3))
  TVKA=THETA(4)
  KA=TVKA *EXP(ETA(4))
  K23=THETA(7)
  K32=THETA(8)
  K24=THETA(9)
  K42=THETA(10)
  SC = V2
$ERROR
 IPRED = F

  Y=F*EXP(EPS(2)) + EPS(1)
$DES
  CONC = A(2)/SC
  DADT(1) = -KA*A(1)
  DADT(2) =  KA*A(1)-VMAX*CONC**THETA(5)/(KM**THETA(5)+CONC**THETA(5)) -K23*A(2)+K32*A(3) -K24*A(2)+K42*A(4)
  DADT(3) = K23*A(2)-K32*A(3)
  DADT(4) = K24*A(2)-K42*A(4)

$THETA
  (100,4000)	; THETA(1) VMAX UNITS =  mass/time
  (100,4000)	; THETA(2) KM UNITS = mass/volume
  (1,50) 		; THETA(3) V  UNITS = volume
  (0.01,1.2,3) 		; THETA(4) KA UNITS = 1/time
  (0.0001,1.6,3) 	;; THETA(5) GAMMA
  (0,1.1,10) 	;; THETA(6) V~WT
  (0.0001,2,10)	 ;; THETA(7) K23
  (0.0001,3,10)	 ;; THETA(8) K32
  (0.0001,0.1,10)	 ;; THETA(9) K24
  (0.0001,0.05,10)	 ;; THETA(10) K42
  ;; Start OMEGA
$OMEGA
  0.1		; ETA(1) ETA ON VMAX
  0.1		; ETA(2) ETA ON KM
  0.1		; ETA(3) ETA ON V2
  0.1		; ETA(4) ETA ON KA
$SIGMA
  (1) ;; EPS(1) ADDITIVE
  (0.3) ;; EPS(2) PROPORTIONAL
$EST METHOD=COND INTER MAXEVALS=9999 NOHABORT NOOMEGABOUNDTEST NOSIGMABOUNDTEST NOTHETABOUNDTEST
$COV UNCOND PRECOND=2
  ;;; Model Identifier =  2,3,1,1

;; Phenotype: ([('COMP', 2), ('ETAs', 3), ('V~WT', 1), ('GAMMA', 1)])
;; Genotype: [2, 3, 1, 1]
;; Num non-influential tokens: 0

$TABLE ID TIME IPRED DV NOAPPEND ONEHEADER NOPRINT FILE= Run1Preds.dat
