Wed 09/18/2024
08:25 PM
$PROBLEM    Dual Numbers benchmark
$INPUT       ID TIME AMT DV WT
  ;; $DATA      c:/git/adpoBenchmark/data/sim_2_4_1_1.csv IGNORE=@
$DATA      D:/git/adpoBenchmark/data/sim_2_4_1_1.csv IGNORE=@

$SUBROUTINE ADVAN6 TOL=7
$MODEL
  COMP=(DEPOT,DEFDOSE)
  COMP=(CENTRAL,NODOSE,DEFOBS)
  COMP=(PERI1,NODOSE)
  COMP=(PERI2,NODOSE)
$PK
  CWT = WT/70

  TVVMAX= THETA(1)
  VMAX=TVVMAX*EXP(ETA(1))
  TVKM = THETA(2)
  KM = TVKM
  TVV2=THETA(3) *CWT**THETA(6)
  V2=TVV2 *EXP(ETA(2))
  TVKA=THETA(4)
  KA=TVKA
  K23=THETA(7)
  K32=THETA(8)
  K24=THETA(9)
  K42=THETA(10)
  SC = V2
$ERROR
  IPRED = F
  Y=F*EXP(EPS(2)) + EPS(1)
$DES
  CONC = A(2)/SC
  DADT(1) = -KA*A(1)
  DADT(2) =  KA*A(1)-VMAX*CONC**THETA(5)/(KM**THETA(5)+CONC**THETA(5)) -K23*A(2)+K32*A(3) -K24*A(2)+K42*A(4)
  DADT(3) = K23*A(2)-K32*A(3)
  DADT(4) = K24*A(2)-K42*A(4)

$THETA
  (100,4000)	; THETA(1) VMAX UNITS =  MG/HR
  (100,4000)	; THETA(2) KM UNITS =  CONC
  (0,50) 	; THETA(3) V  UNITS = L
  (0,1.2) 	; THETA(4) KA UNITS = 1/HR
  (0,1.7) 	;; THETA(5) GAMMA
  (0,1.1) 	;; THETA(6) V~WT
  (0,2)	 ;; THETA(7) K23
  (0,3)	 ;; THETA(8) K32
  (0.0001,0.1,10) 	 ;; THETA(9) K24
  (0.0001,0.05,10) 	 ;; THETA(10) K42
; empty $OMEGA
$OMEGA BLOCK(2)
  0.3		; ETA(1) ETA ON VMAX
  0.1 0.3		; ETA(2) ETA ON V2

$SIGMA
  (1) ;; EPS(1) ADDITIVE
  (0.3) ;; EPS(2) PROPORTIONAL
  $EST METHOD=COND INTER MAXEVALS=9999 NOHABORT NOOMEGABOUNDTEST NOSIGMABOUNDTEST NOTHETABOUNDTEST
  $COV UNCOND PRECOND=2
  ;;; Model Identifier =  2,4,1,1

$TABLE ID TIME IPRED DV NOAPPEND ONEHEADER NOPRINT FILE= Run1Preds.dat
;; Phenotype: ([('COMP', 2), ('ETAs', 4), ('V~WT', 1), ('GAMMA', 1)])
;; Genotype: [2, 4, 1, 1]
;; Num non-influential tokens: 0

NM-TRAN MESSAGES
 WARNINGS AND ERRORS (IF ANY) FOR PROBLEM    1
 (WARNING  2) NM-TRAN INFERS THAT THE DATA ARE POPULATION.

1NONLINEAR MIXED EFFECTS MODEL PROGRAM (NONMEM) VERSION 7.4.3
 ORIGINALLY DEVELOPED BY STUART BEAL, LEWIS SHEINER, AND ALISON BOECKMANN
 CURRENT DEVELOPERS ARE ROBERT BAUER, ICON DEVELOPMENT SOLUTIONS,
 AND ALISON BOECKMANN. IMPLEMENTATION, EFFICIENCY, AND STANDARDIZATION
 PERFORMED BY NOUS INFOSYSTEMS.
 PROBLEM NO.:         1
 Dual Numbers benchmark
 TOT. NO. OF OBS RECS:      480
 TOT. NO. OF INDIVIDUALS:       60
 GENERAL NONLINEAR KINETICS MODEL (DVERK1, ADVAN6)
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 #TBLN:      1
 #METH: First Order Conditional Estimation with Interaction
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
 #TERM:
0MINIMIZATION TERMINATED
 DUE TO PROXIMITY OF NEXT ITERATION EST. TO A VALUE
 AT WHICH THE OBJ. FUNC. IS INFINITE
0AT THE LAST COMPUTED INFINITE VALUE OF THE OBJ. FUNCT.:

0PRED EXIT CODE = 1
0INDIVIDUAL NO.      60   ID= 6.00000000000000E+01   (WITHIN-INDIVIDUAL) DATA REC NO.   2
 THETA=
  1.40E+03   3.37E+03   7.93E+01   1.28E+00   6.62E-01   1.07E-01   2.17E+00   1.88E+00   5.26E-02   1.09E-02
 ETA=
  2.48E-01  -1.00E+00
 NUMERICAL DIFFICULTIES WITH INTEGRATION ROUTINE.
 NO. OF REQUIRED SIGNIFICANT DIGITS IN SOLUTION VECTOR
 TO DIFFERENTIAL EQUATIONS,   7, MAY BE TOO LARGE.

 NO. OF FUNCTION EVALUATIONS USED:      381
 NO. OF SIG. DIGITS UNREPORTABLE

 ETABAR IS THE ARITHMETIC MEAN OF THE ETA-ESTIMATES,
 AND THE P-VALUE IS GIVEN FOR THE NULL HYPOTHESIS THAT THE TRUE MEAN IS 0.

 ETABAR:         1.1094E-02 -3.6638E-02
 SE:             1.0747E-02  4.6764E-02
 N:                      60          60

 P VAL.:         3.0194E-01  4.3336E-01

 ETASHRINKSD(%)  5.5381E+01  2.6928E+01
 ETASHRINKVR(%)  8.0091E+01  4.6604E+01
 EBVSHRINKSD(%)  5.8563E+01  6.1922E+00
 EBVSHRINKVR(%)  8.2830E+01  1.2001E+01
 EPSSHRINKSD(%)  1.1192E+01  1.1192E+01
 EPSSHRINKVR(%)  2.1131E+01  2.1131E+01


 TOTAL DATA POINTS NORMALLY DISTRIBUTED (N):          480
 N*LOG(2PI) CONSTANT TO OBJECTIVE FUNCTION:    882.18099187648579
 OBJECTIVE FUNCTION VALUE WITHOUT CONSTANT:    5860.4870797947397
 OBJECTIVE FUNCTION VALUE WITH CONSTANT:       6742.6680716712253
 REPORTED OBJECTIVE FUNCTION DOES NOT CONTAIN CONSTANT

 TOTAL EFFECTIVE ETAS (NIND*NETA):                           120


 #TERE:
 Elapsed estimation  time in seconds:  1523.96

0PRED EXIT CODE = 1
0INDIVIDUAL NO.       1   ID= 1.00000000000000E+00   (WITHIN-INDIVIDUAL) DATA REC NO.   2
 THETA=
  1.40E+03   3.37E+03   7.93E+01   1.28E+00   6.62E-01   1.07E-01   2.17E+00   1.88E+00   5.26E-02   1.09E-02
 ETA=
  2.73E-01  -8.34E-01
 OCCURS DURING SEARCH FOR ETA AT A NONZERO VALUE OF ETA
 NUMERICAL DIFFICULTIES WITH INTEGRATION ROUTINE.
 NO. OF REQUIRED SIGNIFICANT DIGITS IN SOLUTION VECTOR
 TO DIFFERENTIAL EQUATIONS,   7, MAY BE TOO LARGE.
0PROGRAM TERMINATED BY OBJ
 Elapsed covariance  time in seconds:     0.09
 MESSAGE ISSUED FROM COVARIANCE STEP

 ********************               FIRST ORDER CONDITIONAL ESTIMATION WITH INTERACTION              ********************
 #OBJT:**************                       MINIMUM VALUE OF OBJECTIVE FUNCTION                      ********************
 #OBJV:********************************************     5860.487       **************************************************

 ********************               FIRST ORDER CONDITIONAL ESTIMATION WITH INTERACTION              ********************
 ********************                             FINAL PARAMETER ESTIMATE                           ********************

 THETA - VECTOR OF FIXED EFFECTS PARAMETERS   *********
         TH 1      TH 2      TH 3      TH 4      TH 5      TH 6      TH 7      TH 8      TH 9      TH10
         1.40E+03  3.37E+03  7.93E+01  1.28E+00  6.62E-01  1.07E-01  2.17E+00  1.88E+00  5.26E-02  1.09E-02

 OMEGA - COV MATRIX FOR RANDOM EFFECTS - ETAS  ********
         ETA1      ETA2
 ETA1
+        3.54E-02
 ETA2
+       -3.81E-02  2.50E-01

 SIGMA - COV MATRIX FOR RANDOM EFFECTS - EPSILONS  ****
         EPS1      EPS2
 EPS1
+        9.99E-01
 EPS2
+        0.00E+00  3.52E-01

 OMEGA - CORR MATRIX FOR RANDOM EFFECTS - ETAS  *******
         ETA1      ETA2
 ETA1
+        1.88E-01
 ETA2
+       -4.06E-01  5.00E-01

 SIGMA - CORR MATRIX FOR RANDOM EFFECTS - EPSILONS  ***
         EPS1      EPS2
 EPS1
+        1.00E+00
 EPS2
+        0.00E+00  5.94E-01
 #CPUT: Total CPU Time in Seconds,      728.766
