Fri 10/04/2024
03:52 PM
$SIZES MAXFCN = 5000000
$PROBLEM    Dual Numbers benchmark
$INPUT       ID TIME AMT DV WT
  ;; $DATA      c:/git/adpoBenchmark/data/sim_2_3_1_1.csv IGNORE=@
$DATA      C:/git/adpoBenchmark/data/sim_2_3_1_1.csv IGNORE=@

$SUBROUTINE ADVAN6 TOL=7
$MODEL
  COMP=(DEPOT,DEFDOSE)
  COMP=(CENTRAL,NODOSE,DEFOBS)
  COMP=(PERI1,NODOSE)
  COMP=(PERI2,NODOSE)
$PK
  CWT = WT/70

  TVVMAX= THETA(1)
  VMAX=TVVMAX*EXP(ETA(1))
  TVKM = THETA(2)
  KM = TVKM *EXP(ETA(2))
  TVV2=THETA(3) *CWT**THETA(6)
  V2=TVV2 *EXP(ETA(3))
  TVKA=THETA(4)
  KA=TVKA *EXP(ETA(4))
  K23=THETA(7)
  K32=THETA(8)
  K24=THETA(9)
  K42=THETA(10)
  SC = V2
$ERROR
  IPRED = F
  Y=F*EXP(EPS(2)) + EPS(1)
$DES
  CONC = A(2)/SC
  DADT(1) = -KA*A(1)
  DADT(2) =  KA*A(1)-VMAX*CONC**THETA(5)/(KM**THETA(5)+CONC**THETA(5)) -K23*A(2)+K32*A(3) -K24*A(2)+K42*A(4)
  DADT(3) = K23*A(2)-K32*A(3)
  DADT(4) = K24*A(2)-K42*A(4)

$THETA
  (100,4000)	; THETA(1) VMAX UNITS =  MG/HR
  (100,4000)	; THETA(2) KM UNITS =  CONC
  (0,50) 	; THETA(3) V  UNITS = L
  (0,1.2) 	; THETA(4) KA UNITS = 1/HR
  (0,1.6) 	;; THETA(5) GAMMA
  (0,1.1) 	;; THETA(6) V~WT
  (0,0.7)	 ;; THETA(7) K23
  (0,1)	 ;; THETA(8) K32
  (0.0001,0.1) 	 ;; THETA(9) K24
  (0.0001,0.05) 	 ;; THETA(10) K42
; empty $OMEGA
$OMEGA
  0.1		; ETA(1) ETA ON VMAX
  0.1		; ETA(2) ETA ON KM
  0.1		; ETA(3) ETA ON V2
  0.1		; ETA(4) ETA ON KA
$SIGMA
  (1) ;; EPS(1) ADDITIVE
  (0.3) ;; EPS(2) PROPORTIONAL
  ;;$EST METHOD=COND INTER MAXEVALS=9999 NOHABORT NOOMEGABOUNDTEST NOSIGMABOUNDTEST NOTHETABOUNDTEST
  ;;$COV UNCOND PRECOND=2
  ;;; Model Identifier =  2,3,1,1

$TABLE ID TIME IPRED DV NOAPPEND ONEHEADER NOPRINT FILE= Run1Preds.dat

;; Phenotype: ([('COMP', 2), ('ETAs', 3), ('V~WT', 1), ('GAMMA', 1)])
;; Genotype: [2, 3, 1, 1]
;; Num non-influential tokens: 0

NM-TRAN MESSAGES
 WARNINGS AND ERRORS (IF ANY) FOR PROBLEM    1
 (WARNING  2) NM-TRAN INFERS THAT THE DATA ARE POPULATION.
Note: Analytical 2nd Derivatives are constructed in FSUBS but are never used.
      You may insert $ABBR DERIV2=NO after the first $PROB to save FSUBS construction and compilation time

1NONLINEAR MIXED EFFECTS MODEL PROGRAM (NONMEM) VERSION 7.5.1
 ORIGINALLY DEVELOPED BY STUART BEAL, LEWIS SHEINER, AND ALISON BOECKMANN
 CURRENT DEVELOPERS ARE ROBERT BAUER, ICON DEVELOPMENT SOLUTIONS,
 AND ALISON BOECKMANN. IMPLEMENTATION, EFFICIENCY, AND STANDARDIZATION
 PERFORMED BY NOUS INFOSYSTEMS.
 PROBLEM NO.:         1
 Dual Numbers benchmark
 TOT. NO. OF OBS RECS:      480
 TOT. NO. OF INDIVIDUALS:       60
 GENERAL NONLINEAR KINETICS MODEL (DVERK1, ADVAN6)
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 #TBLN:      1
 #METH: First Order (Evaluation)
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 Elapsed evaluation time in seconds:     0.40
 Elapsed postprocess time in seconds:     0.38

 ********************                             FIRST ORDER (EVALUATION)                           ********************
 #OBJT:**************                       MINIMUM VALUE OF OBJECTIVE FUNCTION                      ********************
 #OBJV:********************************************     8130.039       **************************************************

 ********************                             FIRST ORDER (EVALUATION)                           ********************
 ********************                             FINAL PARAMETER ESTIMATE                           ********************

 THETA - VECTOR OF FIXED EFFECTS PARAMETERS   *********
         TH 1      TH 2      TH 3      TH 4      TH 5      TH 6      TH 7      TH 8      TH 9      TH10
         4.00E+03  4.00E+03  5.00E+01  1.20E+00  1.60E+00  1.10E+00  7.00E-01  1.00E+00  1.00E-01  5.00E-02

 OMEGA - COV MATRIX FOR RANDOM EFFECTS - ETAS  ********
         ETA1      ETA2      ETA3      ETA4
 ETA1
+        1.00E-01
 ETA2
+        0.00E+00  1.00E-01
 ETA3
+        0.00E+00  0.00E+00  1.00E-01
 ETA4
+        0.00E+00  0.00E+00  0.00E+00  1.00E-01

 SIGMA - COV MATRIX FOR RANDOM EFFECTS - EPSILONS  ****
         EPS1      EPS2
 EPS1
+        1.00E+00
 EPS2
+        0.00E+00  3.00E-01

 OMEGA - CORR MATRIX FOR RANDOM EFFECTS - ETAS  *******
         ETA1      ETA2      ETA3      ETA4
 ETA1
+        3.16E-01
 ETA2
+        0.00E+00  3.16E-01
 ETA3
+        0.00E+00  0.00E+00  3.16E-01
 ETA4
+        0.00E+00  0.00E+00  0.00E+00  3.16E-01

 SIGMA - CORR MATRIX FOR RANDOM EFFECTS - EPSILONS  ***
         EPS1      EPS2
 EPS1
+        1.00E+00
 EPS2
+        0.00E+00  5.48E-01
 Elapsed finaloutput time in seconds:     0.09
 #CPUT: Total CPU Time in Seconds,        0.953
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