$PROBLEM    ADPO benchmark - NONMEM
$ABBR DERIV2=NO
$INPUT   ID TIME AMT DV EVID BQL WT
$DATA      c:/git/adpoBenchMark/data/pydarwin_makedata/data_sim.csv IGNORE=@
$SUBROUTINE ADVAN6 TOL=7
$MODEL
  COMP=(DEPOT,DEFDOSE)
  COMP=(CENTRAL,NODOSE,DEFOBS)

$PK
  CWT = WT/70

  TVVMAX= THETA(1)
  VMAX=TVVMAX*EXP(ETA(1))
  TVKM = THETA(2)
  KM = TVKM *EXP(ETA(2))
  TVV2=THETA(3) *CWT**THETA(6)
  V2=TVV2 *EXP(ETA(3))
  TVKA=THETA(4)
  KA=TVKA *EXP(ETA(4))

  SC = V2
$ERROR
  IPRED = F
  IOBS = F*EXP(EPS(2)) + EPS(1)
  Y=F*EXP(EPS(2)) + EPS(1)
$DES
  CONC = A(2)/SC
  DADT(1) = -KA*A(1)
  DADT(2) =  KA*A(1)-VMAX*CONC**THETA(5)/(KM**THETA(5)+CONC**THETA(5))


$THETA
  (100,4000,10000)	; THETA(1) VMAX UNITS =  mass/time
  (100,1000,3000)	; THETA(2) KM UNITS = mass/volume
  (1,50) 		; THETA(3) V  UNITS = volume
  (0.01,1.2,3) 		; THETA(4) KA UNITS = 1/time
  (0.0001,1.6,3) 	;; THETA(5) GAMMA
  (0,1.1,10) 	;; THETA(6) V~WT

  ;; Start OMEGA5
$OMEGA
  0.1		; ETA(1) ETA ON VMAX
  0.1		; ETA(2) ETA ON KM
  0.1		; ETA(3) ETA ON V2
  0.1		; ETA(4) ETA ON KA
$SIGMA
  (1) ;; EPS(1) ADDITIVE
  (0.3) ;; EPS(2) PROPORTIONAL
$SIM (2345) ONLYSIM
$TABLE ID TIME AMT IOBS EVID WT FILE=c:\git\adpoBenchmark\data\OUT_0_3_1_1.DAT NOPRINT NOHEADER NOAPPEND
  ;;; Model Identifier =  0,3,1,1
$TABLE ID VMAX KM V2 KA FIRSTONLY NOAPPEND NOPRINT FILE= c:\git\adpoBenchmark\data\PARMS_0_3_1_1.DAT

;; Phenotype: ([('COMP', 0), ('ETAs', 3), ('V~WT', 1), ('GAMMA', 1)])
;; Genotype: [0, 3, 1, 1]
;; Num non-influential tokens: 0
